# Title: PDEs - The Heat Equation
# Description: Solving a parabolic Partial Differential Equation.
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# CALCULUS AND DIFFERENTIAL EQUATIONS
# quicksheets
# PDEs - the Heat Equation
# This QuickSheet compares a solution for the heat equation with a convection term, a parabolic Partial Differential Equation (PDE):
d/dz(u(x, z)) == c^2*d^2/dx^2(u(x, z)) - ν*d/dx(u(x, z))
# Use literal subscript notation (type a period after the function name to create subscripts) to write the partial derivatives in the PDE, the initial conditions, and boundary conditions. All equations are specified with Boolean equal signs, [Ctrl]=.
Given
u_z(x, z) == 1/4*u_xx(x, z) - 1/2*u_x(x, z)
# Initial condition:
u(x, 0) == sin(π*x/L) + 1/2*sin(3*π*x/L)
# Dirichlet boundary conditions
u(0, z) == 0
u(L, z) == 0
# Solve for u(x,t) over the ranges 0 to L in x and 0 to T in t.
u := Pdesolve(u, x, [0; L], z, [0; T], spacepts, timepts)
# The function u can now be evaluated at any value of x and t in the specified ranges. Note that all appearances of the function and its derivatives must specify both variables, that is, u_x(x,0) and not just u_x.
u(0.1, 0.2) = 0.0802809
x := 0, 0.2 .. L
z := 0 .. T
IC(x) := sin(π*x/L) + 1/2*sin(3*π*x/L)
# Plot the solution and the initial condition at a single time, t.  The FRAME variable has been included so that the solution, u, can be animated over time.
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# end distance
L ≡ 6
# end time
T ≡ 3
# To view the animation, choose Animation > Record from the Tools menu, drag a selection box around the graph, and set the number of frames to 20. Then click the Animate button.
## Approximate Solution
# Here is an approximate solution, found using Mathcad’s symbolic engine:
B(n) := 2/L*integral(IC(x)*e^(-x)*sin(n*π*x/L), x = 0 .. L) collect, sin(n*π); collect, cos(n*π) → (12960*π^4*n^3 - 1512*π^6*n^3 + 180*π^6*n^5 + 233280*π^2*n + 54432*π^4*n + 5940*π^6*n)/(559872*π^2*n^2 + 77760*π^4*n^2 + 23328*π^4*n^4 + 9936*π^6*n^2 - 2160*π^6*n^4 - 540*π^8*n^2 + 432*π^6*n^6 + 354*π^8*n^4 - 60*π^8*n^6 + 3*π^8*n^8 + 2799360*π^2 + 458784*π^4 + 19440*π^6 + 243*π^8 + 5038848) + (sin(π*n)*(276048*π^3*e^-6 + 27540*π^5*e^-6 + 567*π^7*e^-6 + 699840*π*e^-6 + 19440*π^3*n^2*e^-6 - 2808*π^5*n^2*e^-6 - 540*π^5*n^4*e^-6 - 765*π^7*n^2*e^-6 + 213*π^7*n^4*e^-6 - 15*π^7*n^6*e^-6))/(559872*π^2*n^2 + 77760*π^4*n^2 + 23328*π^4*n^4 + 9936*π^6*n^2 - 2160*π^6*n^4 - 540*π^8*n^2 + 432*π^6*n^6 + 354*π^8*n^4 - 60*π^8*n^6 + 3*π^8*n^8 + 2799360*π^2 + 458784*π^4 + 19440*π^6 + 243*π^8 + 5038848) + (cos(π*n)*(12960*π^4*n^3*e^-6 - 1512*π^6*n^3*e^-6 + 180*π^6*n^5*e^-6 + 233280*π^2*n*e^-6 + 54432*π^4*n*e^-6 + 5940*π^6*n*e^-6))/(559872*π^2*n^2 + 77760*π^4*n^2 + 23328*π^4*n^4 + 9936*π^6*n^2 - 2160*π^6*n^4 - 540*π^8*n^2 + 432*π^6*n^6 + 354*π^8*n^4 - 60*π^8*n^6 + 3*π^8*n^8 + 2799360*π^2 + 458784*π^4 + 19440*π^6 + 243*π^8 + 5038848)
U(x, z) := e^(x - z/4)*sum(B(n)*e^(-(n*π/(2*L))^2*z)*sin(n*π*x/L), n = 1 .. 100)
# Compare this solution with the one calculated by pdesolve for a specified time, t0. Note that that solution diverges from this one as t goes beyond the range T calculated by pdesolve:
z0 := 1.8
T = 3  # Try changing the value of t0.
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# Check the goodness of the solution for different granularities in space and time:
spacepts ≡ 50
timepts ≡ 30
# You can also examine all solutions simultaneously in a 3-D graph:
A1 := CreateMesh(u, 0, L, 0, T, 10*L, 5*T)
# [component: inputs A1]
# For further information on the algorithm used, see
# W. E. Schiesser, The Numerical Method of Lines: Integration of Partial Differential Equations, Academic Press, 1991.
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