# Title: Effects of TOL and Method on Definite Integration
# Description: The impact of the TOL parameter and the integration method on definite integral evaluations.
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# CALCULUS AND DIFFERENTIAL EQUATIONS
# quicksheets
# Effects of TOL and Method on Definite Integration
# This QuickSheet illustrates the impact of the TOL parameter and the integration method on definite integral evaluations. Set TOL from Worksheet Options under the Tools menu or directly in the worksheet, as shown.
# The symbolic result of this integral is exact:
integral(1/t1, t1 = 1 .. e^5) → 5
# Default tolerance:
TOL = 0.001
integral(1/t1, t1 = 1 .. e^5) = 5
# Looser tolerance
TOL := 0.1
integral(1/t1, t1 = 1 .. e^5) = 5
# Tighter tolerance
TOL := 0.00001
integral(1/t1, t1 = 1 .. e^5) = 5
# A second integral is exactly:
integral(sin(x)^6/x^5, x = 0 .. ∞) → integral(sin(x)^6/x^5, x = 0 .. ∞)
-2*ln(2) + 27/16*ln(3) = 0.467614
# And here are the results of two numerical approximations:
# Default tolerance
TOL := 0.001
integral(sin(x)^6/x^5, x = 0 .. 90) = 0.467614
# Tighter tolerance
TOL := 0.00000001
integral(sin(x)^6/x^5, x = 0 .. 90) = 0.467614
# For an improper integral (such as the second case above), plot the integrand and determine the interval of integration that really contains the bulk of the area. Experiment with various values of TOL. There is no reason, in the second case, to raise the upper limit of integration beyond 90 (for example), since the integrand sin(x)^6/x^5 is so rapidly decreasing.
# Also, setting TOL to its minimum value of of 10e-15 is, in general, too small for highly discontinuous functions, as more often than not the algorithm cannot compute a good estimate in these cases. Consider the following discontinuous sawtooth function. The combination of the large scale of the amplitudes and sharp discontinuities makes this function unstable at some values of the integral.
f(x) := 2*10^5*Φ(x - 12) + 2*10^5*Φ(x - 2) - 2*10^4*x - 3*10^4
TOL := 10^-5
ISaw(x) := integral(f(x), x = -1 .. x)
x := 0, .5 .. 20
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# Note the spike in the integral around x = 15. This sort of problem can occur when integrating discontinuous functions. Notice that decreasing TOL below 10^-10 actually makes this worse.
# Break this integral into pieces corresponding to the function discontinuities to get a valid answer:
ISaw(x) := if(x < 12, integral(f(x), x = -1 .. x), integral(f(x), x = -1 .. 12) + integral(f(x), x = 12 .. x))
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# It's easy to arrive at functions with these kinds of discontinuities and scale factors when dealing with dimensioned quantities.
## Integration Methods
# In addition to the required tolerance on the solution, the selected method of integration changes the results from numerical integrals. Some methods are more appropriate than others. In general, Mathcad selects an appropriate method based on the shape of the function to be integrated. This is called Autoselect. You can tell which method has been chosen by right-clicking on the integral symbol.
integral(e^(-x^2), x = 0 .. 10) = 0.886227
# The Romberg method is chosen to solve this integral, which involves creating trapezoids under the curve and bisecting the width of the trapezoids until the approximation stabilizes. By comparison,
integral(sin(16*x)^2, x = 0 .. 2*π) = 3.14159
# uses an Adaptive method, since the function is highly oscillatory. In the adaptive method, two approximations with different numbers of approximation points are compared to see if the behavior in any particular chunk of the integration region is being well-modeled. Integration subregions are sized adaptively to get the best picture of the behavior of the function at any particular point.
# Other types of problem integrals are handled numerically, such as
integral(1/sqrt(x), x = 0 .. 4) = 4
# which uses the Singular Endpoint method to deal with the case of dividing by 0. This method is useful for integrating asymptotic functions, but essentially you are throwing away information at the endpoints of the integration region. It's not recommended to use this method unless an endpoint is actually infinite. Finally, there is a method for integrating functions with infinite limits:
integral(1/(1 + u^2), u = 0 .. ∞) = 1.5708
# which is again useful for integration of asymptotic functions.
# One of the limitations of numerical integration is that very narrow pulses in a mostly zero-valued function often integrate to zero. Typically, if the integrand is zero in greater than 95% of the region of integration, then the algorithm may not evaluate the integrand at one of the non-zero points.
f(t1) :=
    1 if 0.45 < t1 < 0.5
    0 otherwise
integral(f(t1), t1 = 0 .. 1) = 0
integral(f(t1), t1 = 0.1 .. 1) = 0.0499997
# You can correct this problem by integrating over a smaller region containing the non-zero part of the integrand. You might also try a technique like Monte Carlo Integration.
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