# Title: DAEs - Simple Pendulum Motion
# Description: Solving a differential algebraic equation.
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# CALCULUS AND DIFFERENTIAL EQUATIONS
# quicksheets
# DAEs - Simple Pendulum Motion
# This QuickSheet can be used to solve an ordinary differential equation (ODE) whose solution is subjected to additional equality constraints beyond initial or boundary conditions, also known as a Differential Algebraic Equation (DAE).
# A simple example is that of the motion of a pendulum. Typically, this problem is recast in polar coordinates because of the difficulty of including the algebraic constraint on the values of motion in x and y in rectangular coordinates.
## Simple Pendulum in Rectangular Coordinates
# Mass of the pendulum’s mass point:
m := 1
# Gravitational acceleration:
g := 9.81
# Length of the pendulum:
L := 1
# Final time for integration:
tend := 100
# In addition to equations for Newton’s Law (force = mass x acceleration), there is a constraint that these positions must sum to the length of the pendulum:
Given
x(τ)^2 + y(τ)^2 == L^2  # τ (tau) represents time
m*d^2/dτ^2(x(τ)) == -x(τ)/L*F(τ)  # the x-component of the force.
m*d^2/dτ^2(y(τ)) == -m*g - y(τ)/L*F(τ)  # the y-component of the force and the additional downward force due to gravity acting on the pendulum.
# The pendulum begins at the bottom of its trajectory, with no downward velocity and a horizontal velocity of 1. Note that these initial conditions must satisfy the algebraic constraint equation.
x(0) == 0
y(0) == -L
x'(0) == 1
y'(0) == 0
F(0) == m*(1 + L*g)/L
[x; y; F] := Odesolve([x; y; F], τ, tend)
# The period of this pendulum, in the small angle approximation, is
T := 2*π*sqrt(L/g)
xmax := x(T/4)
xmin := x(3*T/4)
θmax := asin(xmax/L)
θmax = 0.32063
# Plot the solution.
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# The pendulum swings back and forth in space between the extremes of its x displacement, which is related to the fixed period and the length of the bob. Note the slight variation in the maximum values of y caused by the numerical simulation.
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# Error for the solution to the DAE is given by how closely the algebraic condition, in this case, the equation for x and y position in terms of the pendulum length, is met.
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## Index of a DAE
# Mathcad’s DAE algorithm solves DAEs up to index 3. Roughly speaking, the index of a DAE is the number of differentiations needed until you get a system consisting only of ordinary differential equations with no algebraic constraints. In the case above, you need to get an equation for the change in force over time, without the length constraint. If you consider the plain pendulum equations above, differentiating the algebraic constraint with respect to time yields
## Differentiation 1
0 == 2*x(τ)*d/dt(x(τ)) + 2*y(τ)*d/dt(y(τ))
## Differentiation 2
0 == d/dτ(x(τ)*v_x(τ)) + d/dτ(v_x(τ)*x(τ)) + d/dt(y(τ)*v_y(τ)) + d/dt(v_y(τ)*y(τ))
# Substituting in the original expressions for acceleration in x and y, reduces to
0 == v_x(τ)^2 + v_y(τ)^2 - (x(τ)^2 + y(τ)^2)*F(τ)/(m*L) - g*y(τ)
Given
# equation that results after differentiating the algebraic constraint twice
m*L*(x'(τ)^2 + y'(τ)^2 - g*y(τ))/(x(τ)^2 + y(τ)^2) == F(τ)
m*d^2/dτ^2(x(τ)) == -x(τ)/L*F(τ)
m*d^2/dτ^2(y(τ)) == -m*g - y(τ)/L*F(τ)
x(0) == 0
y(0) == -L
x'(0) == 1
y'(0) == 0
F(0) == m*(1 + L*g)/L
[x; y; F] := Odesolve([x; y; F], τ, tend)
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# Observe how the calculated value for y grows further and further from the value required to meet the algebraic constraint, resulting from the index reduction (index 1).
# One more integration produces a system of ordinary differential equations - three differentiations to reach this point means that the original DAE is of index 3. This procedure can be used to reduce the index of a DAE so that it may be solved by Mathcad, recognizing that the original algebraic constraints are still valid and must be fulfilled by any solution, as well as by any initial value. In the example of the plain pendulum, cast with an Index 2 formulation, the constraint would now be
0 == x(τ)*v_x(τ) + y(τ)*v_y(τ)
# Even though the constraint 0 == x(τ)^2 + y(τ)^2 - s^2 is no longer visible, it must be satisfied by initial values, which must also fulfill the new constraint equation.
## Index Reduction and Drift Effect
# Since it is possible to reduce a system of DAEs to a system of ODEs by index reduction, why consider the algebraic equations explicitly? One reason is that the numerical solution drifts away from the algebraic constraint proportional to the amount of index reduction (as demonstrated with the index 1 solution shown). If you reduce the index by one, the error increases linearly; if you reduce the index by two, it increases quadratically. The complete transformation to a system of ODEs could destroy the algebraic constraint completely. The goal is to only reduce a DAE system to the point where it is tractable: in Mathcad, systems of index 3 or smaller are solvable.
## Additional Examples
# Additional examples may be found in the Mathcad Web Resources. Download the E-book, Differential Equation Solve Block: ODEs and DAEs in Mathcad.
## Reference
# Hairer E., Wanner G. (1991): Solving Ordinary Differential Equations II. Stiff and Differential-Algebraic Problems, Springer Series Computational Mathematics, Vol. 14, Springer
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