# Title: Symbolic Functions
# Description: Computing the value of special symbolic functions.
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# SYMBOLIC MATH
# quicksheets
# Symbolic Functions
# Symbolic math can sometimes return functions that have no definition under numerical evaluation. This QuickSheet shows how to compute the value of several of these special functions: dilog, dirac Delta, hypergeometric, digamma, polygamma, Lambert's W, and Riemann's Zeta. You can evaluate these functions numerically using floating point symbolic evaluation, or you can define them numerically using the summations shown.
## Dilog function
dilog(x) == integral(1/(1 - τ)*ln(τ), τ = 1 .. x)
dilog(1/2) float, 20 → 0.5822405264650125059
# Symbolic integral where it arises:
integral(τ/(e^τ - 1), τ = 0 .. 2) → 2*ln(1 - e^2) - 1/6*π^2 + polylog(2, e^2) - 2
## Dirac Delta (Unit Impulse) Function
# Define Δ(x) == 0  if  x ≠ 0  and
integral(Δ(x), x = -∞ .. ∞) == 1
Δ(1) → 0
integral(Δ(τ), τ = -∞ .. ∞) → 1
integral(Δ(τ)*f(τ), τ = -∞ .. ∞) → f(0)
integral(Δ(τ - a)*f(τ), τ = -∞ .. ∞) → f(a)
# Transforms:
1 fourier, τ → 2*π*Δ(ω)
1 invlaplace, s → Δ(t)
Φ(τ) fourier, τ → (π*ω*Δ(ω) + 1i)/ω
# where Φ is the Heaviside step function.
# Derivatives:
d/dn(Δ(n, 1)) → 0
d/dτ(Δ(n, τ)) → Δ(n + 1, τ)
## Digamma Function
Psi(x) == d/dx(ln(Γ(x)))
# Input argument x:
x := 2
Psi(x) = 0.422784
Psi(2) float, 20 → 0.42278433509846713939
Psi(1) → -γ
Psi(2) → 1 - γ
Psi(3) → 3/2 - γ
Psi(1/2) → -γ - 2*ln(2)
Psi(3/2) → 2 - 2*ln(2) - γ
Psi(5/2) → 8/3 - 2*ln(2) - γ
# where
γ float, 25 → 0.5772156649015328606065121
# is Euler's constant.
# Symbolics output to certain integrals:
integral(e^(-1/5*τ)/(1 - e^(-τ)), τ = 0 .. ∞) → 5*hypergeom(1/5, 1, 6/5, -2) - 5*limit(e^(-1/5*τ)*hypergeom(1/5, 1, 6/5, -e^(-τ) - 1), τ → ∞)
-Psi(1/5) float, 20 → 5.2890398965921882955
## Psi_n:  Polygamma Function
ψ(k, x) := (d^k/dx^k(ln(Γ(x))))
# Input nonnegative integer argument n and real x:
n := 1
x := 2
ψ(n + 1, 2) = 0.644934
Psi(1, 2) → π^2/6 - 1
Psi(1, 2) float, 20 → 0.64493406684822643647
Psi(1, 1) → π^2/6
Psi(2, 1) → (-2)*Zeta(3)
Psi(3, 1) → π^4/15
Psi(1, 1/2) → π^2/2
Psi(1, 3/2) → π^2/2 - 4
Psi(1, 5/2) → π^2/2 - 40/9
# Symbolics output to certain integrals:
integral(τ*e^(-1/3*τ)/(1 - e^(-τ)), τ = 0 .. ∞) → integral(-τ*e^(-1/3*τ)/(e^(-τ) - 1), τ = 0 .. ∞)
# Finally,
Psi(0, x) → 1 - γ  # is equal to
Psi(x) → 1 - γ
## Lambert's W Function
# Lambert's W function is the inverse of  x*exp(x).
# Input argument:
x := 0, 1*10^-3 .. 2
y := 7.5
TOL := 10^-15
LambW(x) := root(y*e^y - x, y)
z := 0, 1 .. 15
# f (x) is one to one and thus has an inverse function, W.
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LambW(y) = 1.56623
LambW(y)*e^LambW(y) = 7.5
# This function is defined in terms of symbolic calculations as a special function:
LambertW(y) → 0
# Symbolic solution of certain nonlinear equations:
u^2 - e^u == 0 solve, u → -0.703467422498
# and
a + b*v == c*e^(-v) solve, v → -1/b*(a - b*LambertW(1/b*c*e^(a/b)))
# Relevant symbolic calculus facts:
integral(LambertW(x), x) → x*LambertW(x) - x + x/LambertW(x)
x := x
d/dx(LambertW(x)) → LambertW(x)/(x*(LambertW(x) + 1))
LambertW(x) series, x == 0, 6 → x - x^2 + (3*x^3)/2 - 8/3*x^4 + (125*x^5)/24 - 54/5*x^6
x*exp(x) - 15/2 == 0 solve, x → LambertW(15/2)
LambertW(15/2) float, 20 → 1.5662309537823875394
# LambertW(n, x) refers to the nth branch of LambertW(x) (as a function in the complex plane).
## Riemann Zeta Function
# Threshold parameter (to allow for additional terms - if  x  is close to 1, then N must be very large - in theory, N is ∞):
N := 700
Zetadef(x) := sum(1/n^x, n = 1 .. N)
# Input argument x>1:
x := 5
Zetadef(x) = 1.03693
Zeta(5) float, 13 → 1.036927755143
# Values of Zeta at even integer arguments:
Zeta(2) → π^2/6
Zeta(4) → π^4/90
Zeta(6) → π^6/945
# Values of Zeta at x between 0 and 5 are best found via symbolics:
Zeta(1/2) float, 20 → -1.4603545088095868129
# Symbolics output to certain integrals and series:
1/2*integral(τ^2/(e^τ - 1), τ = 0 .. ∞) → Zeta(3)
sum(1/(2*k + 1)^7, k = 0 .. ∞) → (127*Zeta(7))/128
## Hypergeometric Function
# The classical and generalized (Barnes extended) hypergeometric functions can also be returned by symbolic calculations.
# The classical hypergeometric function has two numerator coefficients and one denominator coefficient.
# Input numerator coefficients:
n := [1; 1]
# Input denominator coefficient:
d := 2*identity(1)
# Input parameter value:
x := 1/2
# Threshold parameter (upper limit of summation) - in theory,
# K is ∞:
K := 70
ρ(v) := rows(v) - 1
hypergeom(n, d, x) := sum(product(Γ(n[i] + k)/Γ(n[i]), i = 0 .. ρ(n))*x^k/(product(Γ(d[j] + k)/Γ(d[j]), j = 0 .. ρ(d))*k!), k = 0 .. K)
hypergeom(n, d, x) = 1.38629
-ln(1 - x)/x = 1.38629
# The generalized hypergeometric function where n and d can be of any size is given by:
sum((-1)^n/(3*n + 1)^2, n = 0 .. ∞) → sum((-1)^n/(3*n + 1)^2, n = 0 .. ∞)
n := transpose([1, 1/3, 1/3])
d := transpose([4/3, 4/3])
y := -1
hypergeom(n, d, y) = 0.951529
# Finally, a formula for the classical case:
TOL := 10^-12
F(a, b, c, x) := Γ(c)/(Γ(b)*Γ(c - b))*integral(τ^(b - 1)*(1 - τ)^(c - b - 1)*(1 - τ*x)^(-a), τ = 0 .. 1)
# which is the built-in fhyper function. This produces the same result as hypergeom(n,d,x) where n = (a,b) and d = (c):
fhyper(1, 1, 2, x) = 1.38629
n := [1; 1]
dd[0] := 2
hypergeom(n, dd, x) = 1.38629
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