# Title: Symbolic Elliptic Integral Functions
# Description: Computing the value of complete and incomplete elliptic integrals of the first and second kinds.
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# SYMBOLIC MATH
# quicksheets
# Symbolic Elliptic Integral Functions
# Symbolic math can sometimes return functions that have no definition under numerical evaluation. This QuickSheet can be used to compute the value of several of these special functions: complete and incomplete elliptic integrals of the first and second kinds. You can evaluate these functions numerically using floating point symbolic evaluation, or you can define them numerically using the approximation functions shown.
## EllipticK, EllipticF:  Complete and Incomplete Elliptic Integrals of the First Kind
# The EllipticK function is defined as (and given numerically by)
LegK(k) := integral(1/sqrt((1 - τ^2)*(1 - k^2*τ^2)), τ = 0 .. 1)
k := 1/2
LegK(k) = 1.68575
integral(1/sqrt((1 - τ^2)*(1 - k^2*τ^2)), τ = 0 .. 1) → integral(((τ^2/4 - 1)*(τ^2 - 1))^((-1)/2), τ = 0 .. 1)
EllipticK(k) float → EllipticK(1/2)
# Equivalent formulation:
integral(1/sqrt(1 - k^2*sin(θ)^2), θ = 0 .. π/2) = 1.68575
# This is the same as
EllipticF(1, k) float → EllipticF(1, 1/2)
# the incomplete integral of the first kind. EllipticF is given by
LegK2(x, k) := integral(1/sqrt((1 - τ^2)*(1 - k^2*τ^2)), τ = 0 .. x)
# Input parameters:
x := 1/3
k := 1/2
LegK2(x, k) = 0.341455
integral(1/sqrt((1 - τ^2)*(1 - k^2*τ^2)), τ = 0 .. x) → integral(((τ^2/4 - 1)*(τ^2 - 1))^((-1)/2), τ = 0 .. 1/3)
EllipticF(x, k) float → EllipticF(1/3, 1/2)
# Equivalent formulation:
φ := asin(x)
integral(1/sqrt(1 - k^2*sin(θ)^2), θ = 0 .. φ) = 0.341455
## EllipticE:  Legendre Complete and Incomplete Elliptic Integral of the Second Kind
# The complete integral is defined as
LegE(k) := integral(sqrt((1 - k^2*τ^2)/(1 - τ^2)), τ = 0 .. 1)
# Input parameter:
k := 1/2
LegE(k) = 1.46746
# Alternatively, it is given by
integral(sqrt(1 - k^2*sin(θ)^2), θ = 0 .. π/2) = 1.46746
# which produces the following symbolic result:
integral(sqrt(1 - k^2*sin(θ)^2), θ = 0 .. π/2) → ellipticE(1/4)
EllipticE(k) float → EllipticE(1/2)
# This is the same as the incomplete integral with a first argument of 1:
EllipticE(1, k) float → EllipticE(1, 1/2)
x := 1/2
φ := asin(x)
integral(sqrt(1 - k^2*sin(θ)^2), θ = 0 .. φ) → integral(sqrt(1 - 1/4*sin(θ)^2), θ = 0 .. π/6)
## EllipticPi:  Complete and Incomplete Elliptic Integrals of the Third Kind
# This function is defined as (and given numerically by)
LegP(n, k) := integral(1/((1 - n*τ^2)*sqrt((1 - τ^2)*(1 - k^2*τ^2))), τ = 0 .. 1)
n := 1/4
k := 1/5
TOL := 10^-4
LegP(n, k) = 1.8337
integral(1/((1 - n*τ^2)*sqrt((1 - τ^2)*(1 - k^2*τ^2))), τ = 0 .. 1) → integral(-1/(1/4*τ^2 - 1)/sqrt((1/25*τ^2 - 1)*(τ^2 - 1)), τ = 0 .. 1)
EllipticPi(n, k) float → EllipticPi(1/4, 1/5)
# Or alternatively by
integral(1/((1 - n*sin(θ)^2)*sqrt(1 - k^2*sin(θ)^2)), θ = 0 .. π/2) = 1.8337
# The two argument case is equivalent to setting x to 1.
EllipticPi(1, n, k) float → EllipticPi(1, 1/4, 1/5)
# The incomplete EllipticPi function uses a third argument as
LegPi(x, n, k) := integral(1/((1 - n*τ^2)*sqrt((1 - τ^2)*(1 - k^2*τ^2))), τ = 0 .. x)
# Input parameters:
x := 1/3
n := 1/4
k := 1/5
LegPi(x, n, k) = 0.343348
integral(1/((1 - n*τ^2)*sqrt((1 - τ^2)*(1 - k^2*τ^2))), τ = 0 .. x) → integral(-1/(1/4*τ^2 - 1)/sqrt((1/25*τ^2 - 1)*(τ^2 - 1)), τ = 0 .. 1/3)
EllipticPi(x, n, k) float → EllipticPi(1/3, 1/4, 1/5)
# Equivalent formulation:
φ := asin(x)
integral(1/((1 - n*sin(θ)^2)*sqrt(1 - k^2*sin(θ)^2)), θ = 0 .. φ) = 0.343348
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