# Title: Factoring Expressions
# Description: Factoring an expression symbolically.
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# SYMBOLIC MATH
# quicksheets
# Factoring and Expanding Expressions
# This QuickSheet shows how to find the factors of an integer, a radical expression, and an algebraic expression using the symbolic keyword "factor." It also shows how to expand expressions using the keyword "expand."
# To factor an integer, select it and press [Ctrl] [Shift] [.] to insert a placeholder followed by the symbolic equal sign. Then type the keyword "factor" in the placeholder. Then press [Enter]. For example:
# Enter an integer:
int := 251357832
# Factors:
int factor → 2^3*3^2*11*317371
# You can also factor radical expressions and polynomials this way.
# Enter a radical expression:
rep := sqrt(125)
# Factors:
rep factor → 5*sqrt(5)
# Enter a polynomial in x:
poly(x) := x^3 - 2*x + 1
# Factors:
poly(x) factor → (x - 1)*(x^2 + x - 1)
# This factors the polynomial over the rational numbers. In other words, the coefficients of the factors, x - 1 and x^2 + x - 1, are rational numbers (integers or ordinary fractions). You cannot factor the second term, x^2 + x - 1, any further over the rational numbers, because its roots involve sqrt(5) , which is irrational. You can find the roots using the keyword "solve," which returns the roots in a vector.
x^2 + x - 1 solve → [-1/2*sqrt(5) - 1/2; sqrt(5)/2 - 1/2]
# To factor the original polynomial completely over the real numbers, add the radical expression sqrt(5) as an argument by typing a comma after "factor" and then typing  5^(1/2), or sqrt(5) , in the placeholder that appears after the comma.
# Factors:
poly(x) factor, 5^(1/2) → (x - 1)*(x + sqrt(5)/2 + 1/2)*(x - 1/2*sqrt(5) + 1/2)
# Note: In general, using the keyword "factor" with no additional arguments factors a polynomial over the field of numbers generated by its coefficients. That is, if the coefficients of polynomial are all rational numbers, the coefficients of the factors must all be rational. However, if the coefficients of the polynomial include a radical expression, the coefficients of the factors can also contain the same radical expression.
## Expanding Expressions
# Use the expand keyword to expand expressions.
(x + 1)*(x + y)^2 expand → x^3 + 2*x^2*y + x^2 + x*y^2 + 2*x*y + y^2
# If you type a comma, followed by a subexpression of the main expression, after "expand," Mathcad expands all terms except for the subexpression.
(x + 1)*(x + y)^2 expand, x + 1 → x^2*(x + 1) + y^2*(x + 1) + 2*x*y*(x + 1)
# If you include a subexpression that is not in the original expression, the result is the same as if you had not included the modifier.
(x + y)^2 expand → x^2 + 2*x*y + y^2
(x + y)^2 expand, x + 1 → x^2 + 2*x*y + y^2
## Factoring a Polynomial Completely Over the Real or Complex Numbers
# To factor a polynomial with real coefficients over the real numbers, type a comma-separated list of all the radicals appearing in the roots of the polynomial after "factor." For example,
x^3 - 2 factor, 2^(1/3), sqrt(3) → (x^2 + 2^(1/3)*x + 2^(2/3))*(x - 2^(1/3))
# To factor any polynomial completely over the complex numbers, add the complex number i to the list of radicals. For example:
x^3 - 2 solve → [(2^(1/3)*(1i*sqrt(3) - 1))/2; 2^(1/3); -1/2*2^(1/3)*(1i*sqrt(3) + 1)]
x^3 - 2 factor, 2^(1/3), sqrt(3), i → (x^2 + 2^(1/3)*x + 2^(2/3))*(x - 2^(1/3))
# Alternatively, define a vector by the symbolic roots and then insert entries of the vector after "factor."
v := x^3 - 2 solve → [(2^(1/3)*(1i*sqrt(3) - 1))/2; 2^(1/3); -1/2*2^(1/3)*(1i*sqrt(3) + 1)]
x^3 - 2 factor, v[0] → (x + 2^(1/3)*((1/2)*1i*sqrt(3) + 1/2))*(x - 2^(1/3)*((1/2)*1i*sqrt(3) - 1/2))*(x - 2^(1/3))
# Since v_0 contains both radicals appearing in the roots, as well as i, you only need to enter one of the roots.
# You can also factor a polynomial over the real or complex numbers, into terms with floating-point, rather than symbolic, coefficients using the modifiers "real" or "complex." For example,
x^3 - 2 → x^3 - 2 factor, domain == real; float, 3 → (x - 1.26)*(x*1.26 + x^2 + 1.59)
x^3 - 2 → x^3 - 2 factor, domain == complex; float, 3 → (x - 1.26)*(x + 0.63 + (-1.09)*1i)*(x + 0.63 + 1.09i)
# The keyword "float" is used just to reduce the number of decimal places displayed in the coefficients.
## Simplifying and Rewriting Expressions
# The keyword "simplify" is an all-purpose tool for simplifying expressions. Here are some examples:
e^(2*x)*e^(7*y) simplify → e^(2*x + 7*y)
sin(x)^2 + cos(x)^2 simplify → 1
# To combine expressions using specific types of identities, or to rewrite expressions in special forms, use the keywords "combine" or "rewrite."
2*sin(x)*cos(x) combine, sincos → sin(2*x)
# The modifier "sincos" after "combine" tells Mathcad to use identities for sines and cosines to combine the terms.
# To rewrite expressions in terms of elementary functions, use the keyword "rewrite."
sin(x) rewrite, exp → (1/2)*1i*e^((-1i)*x) - e^(1i*x)*(1i*(1/2))
# The modifier "exp" tells Mathcad to rewrite sin(x) in terms of exponential functions.
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