# Title: Symbolic Integral Functions
# Description: Computing the value of special symbolic functions.
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# SYMBOLIC MATH
# quicksheets
# Symbolic Integral Functions
# Symbolic math can sometimes return functions that have no definition under numerical evaluation. This QuickSheet can be used to compute the value of several of these special functions: exponential, sine, cosine, and Fresnel sine and cosine integrals. You can evaluate these functions numerically using floating point symbolic evaluation, or you can define them numerically using the summations shown.
## Ei:  Exponential Integral
# The single-argument function is the Cauchy Principal Value, given by the following, with threshold parameter (to allow for additional terms - for |x| < 4, use N = 100 - in theory, N is ∞)
N := 100
Ei(x) == γ + ln(x) + sum(x^n/(n*n!), n = 1 .. N)
# gives the principal value of the exponential integral, Ei_1(x) = Ei(1,x), where γ is Euler's constant. Input nonzero argument x:
Ei(2) float, 20 → 4.9542343560018901634
# This is the same as the following integral:
γ + ln(2) + (1i*π + integral(1/τ*(e^τ - 1), τ = 0 .. 2)) → 1i*π + γ + ln(2) + limit(-Ei(1, -τ) - ln(τ), τ → 2+) - limit(-Ei(1, -τ) - ln(τ), τ → 0-)
-Ei(1, -2) - 1i*π float, 20 → 4.9542343560018901634
# or, numerically,
γnum := γ float, 15 → 0.577215664901533
γnum + ln(2) + (1i*π + integral(1/τ*(e^τ - 1), τ = 0 .. 2)) = 4.95423 + 3.14159i
Ei_1(x) == -γ - ln(x) - sum((-1)^n*x^n/(n*n!), n = 1 .. N)
# Input nonzero argument x0:
x0 := 2
Ei(1, x0) float, 20 → 0.048900510708061119567
# This is the same as the following integral:
-γ - ln(x0) + integral(1/τ*(1 - e^(-τ)), τ = 0 .. x0) float, 10 → 0.04890051071
# It is also the same as the following integral for x>0:
integral(e^(-τ)/τ, τ = x0 .. N) = 0.0489005
# Symbolics output to certain integrals:
integral(e^(-τ)/τ, τ = x .. ∞) → Ei(1, x)
integral((1 - e^(-τ))/τ, τ = 0 .. x) → ln(x) - 1i*π + integral(-1/τ*e^(-τ), τ = 0 .. x) + ∞
integral(e^τ/τ, τ = -∞ .. x) → -Ei(1, -x)
# Thus  Ei(x) == -Ei_1(-x) == Ei(1, x)  for  x < 0  and Ei(x) == -Ei_1(-x) - π*1i  for  x > 0 . More generally,
Ei(-2) float, 5 → -0.048901
Ei(n, x) == integral(exp(-x*τ)/τ^n, τ = 1 .. ∞)
-Ei(1, 2) float, 5 → -0.048901
# The Ei function arises in other integrals too:
integral(e^(-a^2*τ)/(b + τ), τ = 0 .. ∞) → Ei(1, a^2*b)*e^(a^2*b) - e^(a^2*b)*limit(Ei(1, a^2*b + a^2*τ), τ → ∞)
integral(e^(-c^2*τ)/τ^2, τ = 1 .. ∞) → e^(-c^2) + limit(c^2*Ei(1, c^2*τ) - 1/τ*e^(-c^2*τ), τ → ∞) - c^2*Ei(1, c^2)
## Ci:  Cosine Integral
# Threshold parameter:
N0 := 50
Ci(x) == γ + ln(x) + sum((-1)^n*x^(2*n)/((2*n)*2*n!), n = 1 .. N0)
Ci(x0) float, 15 → 0.422980828774865
# This is the same as the following integral:
γ + ln(x0) + integral((cos(τ) - 1)/τ, τ = 0 .. x0) → Ci(2)
# Symbolics output to certain integrals:
integral(cos(τ)/τ, τ = 1 .. x) → Ei(1, -1i)/2 - 1/2*Ei(1, 1i*x) - 1/2*Ei(1, -1i*x) + Ei(1, 1i)/2
-integral(cos(τ)/τ, τ = x .. ∞) → -1/2*Ei(1, -1i*x) - 1/2*Ei(1, 1i*x) - limit(-1/2*Ei(1, -1i*τ) - 1/2*Ei(1, 1i*τ), τ → ∞)
## Si: Sine Integral
# Threshold parameter:
N0 := 50
Si(x) := sum((-1)^n*x^(2*n + 1)/((2*n + 1)*(2*n + 1)!), n = 0 .. N0)
Si(2) float, 20 → 1.6054129768026948486
# This is the same as the following integral:
TOL := 10^-12
integral(1/τ*sin(τ), τ = 0 .. x0) = 1.60541
# Symbolics output to certain integrals:
integral(sin(τ)/τ, τ = 0 .. x) → Si(x)
π/2 - integral(sin(τ)/τ, τ = x .. ∞) → Si(x)
## FresnelC:  Fresnel Cosine Integral
FresnelC(x) == integral(cos(π/2*τ^2), τ = 0 .. x)
# Input nonzero argument x:
FresnelC(2) float, 15 → 0.488253406075341
# Symbolics output to certain integrals:
integral(cos(u)/sqrt(u), u = 0 .. x) → sqrt(2)*sqrt(π)*FresnelC((sqrt(2)*sqrt(x))/sqrt(π))
integral(FresnelC(x), x) → integral(FresnelC(x), x)
## FresnelS:  Fresnel Sine Integral
# This section can be used to compute the value of Fresnel sine integrals.
FresnelS(x) == integral(sin(π/2*τ^2), τ = 0 .. x)
FresnelS(2) float, 15 → 0.343415678363698
# Symbolics output to certain integrals:
integral(u^(3/2)*sin(u), u = 0 .. x) → integral(u^(3/2)*sin(u), u = 0 .. x)
integral(e^(-τ)*sin(τ^2)/τ, τ = 0 .. ∞) factor → integral((sin(τ^2)*e^(-τ))/τ, τ = 0 .. ∞)
integral(sin(a*x^2 + b*x + c), x) → sqrt(π)*(FresnelS((sqrt(2)*(b/2 + a*x)*sqrt(1/a))/sqrt(π))*cos((a*c - 1/4*b^2)/a) + FresnelC((sqrt(2)*(b/2 + a*x)*sqrt(1/a))/sqrt(π))*sin((a*c - 1/4*b^2)/a))*sqrt(1/(2*a))
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