# Title: Symbolic Solutions of Equations
# Description: Solving a system of equations symbolically.
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# SYMBOLIC MATH
# quicksheets
# Symbolic Solutions of Equations
# This QuickSheet explains how to solve equations in one or many unknowns symbolically. You can solve these equations in either of the following ways:
# •  Use the keyword "solve" with the symbolic equal sign. This is the recommended method because results are automatically updated when you make changes elsewhere in the worksheet.
#
# •  Select the variable you want to solve for and then select Variable > Solve from the Symbolics menu. In this case, results are not automatically updated.
# This QuickSheet covers the following topics:
# Solving a Single Equation
# Symbolic Solve Blocks
# Solving Polynomials in Radicals
# Making Assumptions About the Domain of a Variable
# Returning Detailed Solutions to Equations
## Solving a Single Equation
# For example, to solve the equation 1/2*x^2 + x + 2 == 0 using the symbolic equal sign:
# 1.  Type the left side of the equation. Note: Since the right side of the  equation is 0, you do not need to type the entire equation.
# 2.  Press [Ctrl] [Shift] [.] to insert the symbolic equals sign.
# 3.  Type the keyword "solve" in the placeholder that appears to the left of the symbolic equal sign.
# 4.  Press [Enter].
1/2*x^2 + x + 2 solve → [-1i*sqrt(3) - 1; 1i*sqrt(3) - 1]
# Mathcad returns the solutions in a vector.
# If you write the constant 2 in decimal format as 2.0, Mathcad returns floating point answers:
1/2*x^2 + x + 2.0 solve → [(-1.73205080757)*1i - 1.0; 1.73205080757i - 1.0]
# If neither side of the equation is 0, type the entire equation, using Boolean equals ([Ctrl] [=]).
e^x == -1 solve → 1i*π
# To solve an equation in more than one variable, specify the variable you want to solve for by typing a comma after "solve" and then typing the variable in the placeholder that appears after the comma.
(α*f + 1)/(f - β) == e^(-α) solve, f → -(β*e^(-α) + 1)/(α - e^(-α))
# A fourth-order polynomial yields four solutions:
x^4 - 3*x^3 + 17.2*x^2 - 3*x + 60.5 solve → [
    (-1.91686341058)*1i - 0.344642987976;
    1.91686341058i - 0.344642987976;
    1.84464298798 + (-3.54219158254)*1i;
    1.84464298798 + 3.54219158254i
]
# The following example shows how to find the roots of a polynomial with  parameterized coefficients:
a := 1
b := 2
c := 3
f(x) := a*x^3 + b*x + c
f(x) solve → [-1; 1/2 - sqrt(11)*(1i*(1/2)); (1/2)*1i*sqrt(11) + 1/2]
# If you later change the values of any of the coefficients above the definition f(x), Mathcad automatically updates the solutions.
## Symbolic Solve Blocks
# You can also solve a system of equations symbolically. For example, find the intersection of two circles symbolically:
Given
x^2 + y^2 == r^2  # Use [Ctrl] [=] to type the bold equals sign.
(x - α)^2 + y^2 == r^2
M(α, r) := Find(x, y) → [α/2, α/2; sqrt(4*r^2 - α^2)/2, -1/2*sqrt(4*r^2 - α^2)]
# Type [Ctrl] [.] after Find to insert the symbolic equal sign. In this case, there are two solutions. Each column of the answer represents one solution, with x in the first row and y in the second. Note that you can assign the results of the symbolic calculation a Mathcad function in terms of the unknown symbolic variables.
M(1, 3) = [0.5, 0.5; 2.95804, -2.95804]
# More examples are shown in the QuickSheet on solving linear systems.
## Solving Polynomials in Radicals
# By default, Mathcad solves polynomial equations up to degree 4 in radicals - that is, the solutions are built up, using the ordinary operations of arithmetic, in terms of radicals of the form nthroot(c, n) . For example,
x^4 - x^2 + 1 solve → [sqrt(3)/2 - 1i*(1/2); sqrt(3)/2 + 1i*(1/2); 1i*(1/2) - 1/2*sqrt(3); -1/2*sqrt(3) - 1i*(1/2)]
# However, as the mathematician Galois proved in the nineteenth century, there are polynomials of degree 5 and greater that cannot be solved in radicals, such as x^5 −10x + 2. For these polynomials, Mathcad returns a numerical approximation for the roots:
x^5 - 10*x + 2 solve → [
    1.72430647424;
    0.200032025629;
    1.78174179506i - 0.0496125095192;
    (-1.78174179506)*1i - 0.0496125095192;
    -1.82511348083
]
## Making Assumptions About the Domain of a Variable
# You can use the keyword "assume" to make assumptions about the domain of a variable in the problem, for example, that it is a real number. The following examples illustrate this.
# To solve the equation (x^3 - 1)(x^2 - 2) = 0 assuming that x is a real number,
# do the following:
# 1.  Type the equation followed by the keyword "solve."
# (x^3 - 1)(x^2 - 2) = 0 solve →
# 2.  Click assume on the Symbolic toolbar.
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# 3.  In the placeholder that appears after "assume", type
#
# x = real
#
# using Boolean equals ([Ctrl][=]).
# 4. Press [Enter].
(x^3 - 1)*(x^2 - 2) == 0 solve; assume, x == real → [-sqrt(2); sqrt(2); 1]
# Mathcad returns only the real solutions to the equation.
# Note: "assume" must appear after the keyword(s) for which you want the restriction on the variable to apply.
# To find just the real solutions that are between 0 and 2, type x = RealRange(0,2) in Step 4.
(x^3 - 1)*(x^2 - 2) == 0 solve; assume, x == RealRange(0, 2) → [1; sqrt(2)]
# To find just the integer solutions, type x = integer in Step 4.
(x^3 - 1)*(x^2 - 2) == 0 solve; assume, x == integer → 1
# You can also use "assume" to restrict the domain of a variable in a symbolic evaluation. For example,
sin(π*n) → sin(π*n)
sin(π*n) assume, n == integer → 0
## Returning Detailed Solutions to Equations
# To return detailed solutions to equations, add the modifier "fully" after solve. In the following example, using "fully" returns the values of a for which the solution is valid:
a := a
(3*a - 7)*x == 1 solve, x, fully → {
    1/(3*a - 7) if a ≠ 7/3
    undefined if a == 7/3
}
# The detailed result tells you the value of a for which the solution is undefined. You can still use the detailed result to define a function.
f(a) := (3*a - 7)*x == 1 solve, x, fully →  # error: This variable is undefined.
f(1) → undefined
# Note that you can even evaluate the function f at the value a == 7/3.
f(7/3) → undefined
# annotation to a formula above: An outline of the features new to Mathcad 13.
# For equations whose solution is periodic, Mathcad returns a single solution, followed by an expression for adding integer multiples of the period to the first solution.
sin(x) == cos(x) solve, fully → {
    π/4 + π*_n if _n ∈ ℤ
    undefined otherwise
}
# The expression
π/4 + π*_n if _n ∈ ℤ
# means the single solution π/4  plus all integer multiples of π. Mathcad inserts a new, generated variable _n that represents an arbitrary integer. The expression
_n ∈ ℤ
# means "_n is an element of the set ℤ of integers".
# The generated variable _n is preceded by an underscore to avoid conflicts with other variables that you might have defined elsewhere in the worksheet.
# Mathcad returns the generated variable preceded by an underscore [_] to avoid name conflicts with other variables that you might have defined elsewhere in the worksheet.
# To change the name of the generated variable, add the modifier "using," followed by an equation, written using Boolean equals ([Ctrl] [=]), that sets the generated variable equal to the new variable. For example:
sin(x) == cos(x) solve, fully, using, _n == k →  # error: The "using" keyword cannot rename a variable that does not newly appear in the result expression.
# If the variable you specify after "using" is not the generated variable that "solve" would have returned, Mathcad returns an error.
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