# Title: Symbolic Calculus
# Description: Calculus and the symbolic processor.
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# SYMBOLIC MATH
# quicksheets
# Symbolic Calculus
# This QuickSheet illustrates how to solve symbolic problems in calculus. You can solve these problems in either of the following ways:
# •  Evaluate the expression for the problem using the symbolic equal sign, adding keywords to modify the problem if necessary. This is the recommended method because results are automatically updated when you make changes elsewhere in the worksheet.
#
# •  Select items from the Symbolics menu. In this case, results are not automatically updated.
# The examples in this QuickSheet illustrate the first method. The QuickSheet covers the following topics:
# Derivatives and Integrals
# Limits
# Taylor and Maclaurin Series
# Partial Fractions
# Continued Fractions
## Derivatives and Integrals
# To find the derivative of z*atan(z):
# 1.  Press [?] to insert the derivative operator or click the derivative operator on the Calculus toolbar and fill in the placeholders as shown:
d/dz(z*atan(z))
# 2.  Press [Ctrl] [.] to insert the symbolic equal sign and then press [Enter].
d/dz(z*atan(z)) → atan(z) + z/(z^2 + 1)
# Alternatively, type just the expression z*atan(z) without the derivative operator, click on the variable of differentiation z, and select Variable > Differentiate from the Symbolics menu. However, in this case the result is not "live," and does not update if you change the value of z in your worksheet.
# You can assign the result of a symbolic differentiation to a function, which can be useful if you don't have values for all the variables. For example:
f(x) := d/dx(2*x^2 + y) → 4*x
f(2) = 8
# You can also take the derivative of a complex function:
d/dx(sin(x*1i + y)) → 1i*cos(1i*x + y)
# To display the result in the standard form a + b*i, use the keyword "rectangular":
d/dx(sin(x*1i + y)) rectangular → 1i*Re(cos(1i*x + y)) - Im(cos(1i*x + y))
# To find the indefinite integral of a function, press [Ctrl] I to insert the indefinite integral operator and then type the integrand in the placeholder. Then press [Ctrl] [.] to insert the symbolic equal sign. For example:
integral(e^x*sin(x), x) → -1/2*e^x*(cos(x) - sin(x))
# Note: You cannot evaluate an indefinite integral with the numerical equal sign.
# To find a definite integral, press [&] to insert the definite integral operator and then type the integrand and the limits of integration in the placeholders.
integral(e^x*sin(x), x = 0 .. 1) → 1/2 - 1/2*e*(cos(1) - sin(1))
# Note that Mathcad returns the answer symbolically. To evaluate a definite integral numerically, use the numerical equal sign:
integral(e^x*sin(x), x = 0 .. 1) = 0.909331
# For greater accuracy, use the keyword "float":
integral(e^x*sin(x), x = 0 .. 1) float, 30 → 0.909330673631478617034602154687
# You can also use parameters in the integrand or limits of integration:
integral(x^3, x = 1 .. c) → c^4/4 - 1/4  # Press [&] for definite integrals.
integral(a*x^2, x) → (a*x^3)/3  # Press [Ctrl] I for indefinite integrals.
# Whether a parameterized integral is finite might depend on the value of a parameter. For example, the following integral is finite only when c > 0 , so Mathcad returns the result in terms of a limit:
integral(e^(-c*t1), t1 = 0 .. ∞) → undefined
# To evaluate the integral only for values of c > 0 , use the keyword "assume":
integral(e^(-c*t1), t1 = 0 .. ∞) assume, c > 0 → 1/c
# Mathcad knows the Fundamental Theorem of Calculus, which states the following relationships between derivatives and integrals:
integral(d/dx(G(x)), x) → G(x)
d/dx(integral(g(t1), t1 = a .. x)) → g(x)
## Limits
# You can evaluate the limits of functions symbolically. For example, to evaluate the limit of the function sin(x)/x as x approaches 0:
# 1.  Press [Ctrl] L to insert the limit operator. Then type the variable x in the placeholder to the left of the arrow, the value it approaches, 0, in the placeholder to the right of the arrow, and the function sin(x)/x in the placeholder to the right of "lim":
limit(sin(x)/x, x → 0)
# 2.  Press [Ctrl] [.] to insert the symbolic equal sign and then press [Enter].
limit(sin(x)/x, x → 0) → 1
# Note: You cannot evaluate limits using the numerical equal sign.
# You can also compute left- and right-handed limits of functions:
# Left-handed limit:
limit(h(x), x → p-) → h(p)
# Right-handed limit:
limit(h(x), x → p+) → h(p)
## Taylor and Maclaurin Series
# You can expand functions in a Taylor or Maclaurin series using the keyword "series." For example, the following expression generates a Maclaurin series for sin(x):
sin(x) series → x - 1/6*x^3 + x^5/120
# By default, Mathcad returns the terms up to order 6, so that the highest power in the answer is 5. To increase the order of the terms to 10, type a comma after "series" and then type x, 10 in the placeholder:
sin(x) series, x, 10 → x - 1/6*x^3 + x^5/120 - 1/5040*x^7 + x^9/362880
# To expand sin(x) in a Taylor series about 1, type (x == 1) after "series," using Boolean equals ([Ctrl] [=]).
sin(x) series, x == 1 → sin(1) + cos(1)*(x - 1) - 1/2*sin(1)*(x - 1)^2 - 1/6*cos(1)*(x - 1)^3 + (sin(1)*(x - 1)^4)/24 + (cos(1)*(x - 1)^5)/120
# You can also expand functions in more than one variable. Here is the series expansion for e^(x + y) around the point (x, y) == (0, 1):
e^(x + y) series, x == 0, y == 1 → e + x*e + (x^2*e)/2 + (x^3*e)/6 + (x^4*e)/24 + (x^5*e)/120 + (y - 1)*(e + x*e + (x^2*e)/2 + (x^3*e)/6 + (x^4*e)/24 + (x^5*e)/120) + (y - 1)^2*(e/2 + (x*e)/2 + (x^2*e)/4 + (x^3*e)/12 + (x^4*e)/48 + (x^5*e)/240) + (y - 1)^3*(e/6 + (x*e)/6 + (x^2*e)/12 + (x^3*e)/36 + (x^4*e)/144 + (x^5*e)/720) + (y - 1)^4*(e/24 + (x*e)/24 + (x^2*e)/48 + (x^3*e)/144 + (x^4*e)/576 + (x^5*e)/2880) + (y - 1)^5*(e/120 + (x*e)/120 + (x^2*e)/240 + (x^3*e)/720 + (x^4*e)/2880 + (x^5*e)/14400)
# To display the coefficients as 3 digit numbers instead of in terms of e,
#
# 1.  Place the cursor to the right of y == 1 and press [Ctrl] [Shift] [.] to insert a placeholder for a second keyword.
e^(x + y) series, x == 0, y == 1 →  # error: This placeholder is empty.
# 2.  Type "float, 3" in the placeholder and press [Enter].
e^(x + y) series, x == 0, y == 1; float, 3 → 2.71828182846*x + 1.35914091423*x^2 + 0.45304697141*x^3 + 0.113261742852*x^4 + 0.0226523485705*x^5 + 2.71828182846 + (y - 1)*(2.71828182846*x + 1.35914091423*x^2 + 0.45304697141*x^3 + 0.113261742852*x^4 + 0.0226523485705*x^5 + 2.71828182846) + (y - 1)^2*(1.35914091423*x + 0.679570457115*x^2 + 0.226523485705*x^3 + 0.0566308714262*x^4 + 0.0113261742852*x^5 + 1.35914091423) + (y - 1)^3*(0.45304697141*x + 0.226523485705*x^2 + 0.0755078285683*x^3 + 0.0188769571421*x^4 + 0.00377539142842*x^5 + 0.45304697141) + (y - 1)^4*(0.113261742852*x + 0.0566308714262*x^2 + 0.0188769571421*x^3 + 0.00471923928552*x^4 + 0.000943847857104*x^5 + 0.113261742852) + (y - 1)^5*(0.0226523485705*x + 0.0113261742852*x^2 + 0.00377539142842*x^3 + 0.000943847857104*x^4 + 0.000188769571421*x^5 + 0.0226523485705)
# The following expression expands around the point (x, y) == (0, 1) but shows only terms up to order 3, that is, terms whose exponents sum to less than 3.
e^(x + y) series, x == 0, y == 1, 3; float, 3 → 2.71828182846*x + 1.35914091423*x^2 + 2.71828182846 + (y - 1)*(2.71828182846*x + 1.35914091423*x^2 + 2.71828182846) + (y - 1)^2*(1.35914091423*x + 0.679570457115*x^2 + 1.35914091423)
## Partial Fractions
# You can perform a partial fraction decomposition of a rational function (quotient of polynomials) using the keyword "parfrac":
(2*x^2 - 3*x + 1)/(x^3 + 2*x^2 - 9*x - 18) parfrac → 1/(3*(x - 3)) - 3/(x + 2) + 14/(3*(x + 3))
# Here is another example defined via the range product
x^2*product(1/(x + n), n = 1 .. 4) parfrac, x → 1/(6*(x + 1)) - 2/(x + 2) + 9/(2*(x + 3)) - 8/(3*x + 12)
# Note that because the expression contains more than one variable, you must specify the variable with respect to which you want to perform the partial fractions decomposition after "parfrac."
## Decompositions Over the Real or Complex Numbers
# By default, Mathcad performs the partial fractions decomposition over the field of rational numbers. That is, if the initial expression is a quotient of polynomials with rational coefficients, the polynomials in the result also have rational coefficients. For example,
1/((x^2 + 1)*(x^2 - 2)) parfrac → 1/(3*(x^2 - 2)) - 1/(3*x^2 + 3)
# To perform a further decomposition of one of the terms in the expression, apply "parfrac" to just that term and type a root of the denominator as an argument after "parfrac." For example,
1/(3*(x^2 - 2)) parfrac, sqrt(2) → sqrt(2)/(12*(x - sqrt(2))) - sqrt(2)/(12*x + 12*sqrt(2))
# For expressions with complex roots, type the imaginary number i after "parfrac."
1/(3*x^2 + 3) parfrac, 1i → (1i*(1/6))/(x + 1i) - 1/6*1i/(x - 1i)
# To perform a complete partial fractions decomposition of a rational function over the complex numbers, type "domain = complex" after "parfrac", using the Boolean equals sign [Ctrl] [=].
1/(x^4 - 4) parfrac, domain == complex → sqrt(2)/(16*(x - sqrt(2))) - sqrt(2)/(16*x + 16*sqrt(2)) + ((1/16)*1i*sqrt(2))/(x - 1i*sqrt(2)) - 1/16*1i*sqrt(2)/(x + 1i*sqrt(2))
# To obtain a decomposition over the real numbers, you can combine the last two terms into a single term with real coefficients, using the keyword "simplify" as follows:
(1/16)*i*sqrt(2)/(x - i*sqrt(2)) - 1/16*i*sqrt(2)/(x + i*sqrt(2)) simplify → i^2/(4*(x^2 - 2*i^2))
# Then substitute this result for the last two terms in the decomposition over the complex numbers to obtain the decomposition over the real numbers:
1/(x^4 - 4) == sqrt(2)/(16*(x - sqrt(2))) - sqrt(2)/(16*x + 16*sqrt(2)) - 1/(4*x^2 + 8)
# Note: Suppose that the original expression is a quotient of polynomials with real coefficients. Then, in the decomposition over the complex numbers, the terms containing complex coefficients occur in pairs corresponding to complex conjugate roots. To obtain a decomposition over the real numbers, combine each such pair of terms as in the example above.
## Continued Fractions
# To find the continued fraction expansion of a number or function, use the keyword "confrac," which returns a vector containing the terms of the continued fraction. For example,
(14 + sqrt(3))/5 confrac → [3; 6; 1; 4; 1; 7; 1; 4; 1; 7; 1; 4]
# To see the actual continued fraction, rather than the vector, add the modifier "fraction" after "confrac."
(14 + sqrt(3))/5 confrac, fraction → 3 + 1/(6 + 1/(1 + 1/(4 + 1/(1 + 1/(7 + 1/(1 + 1/(4 + 1/(1 + 1/(7 + 1/(1 + 1/4))))))))))
# By default, Mathcad returns enough terms of the continued fraction so that the answer is accurate to 10 significant digits. To return results with a different degree of accuracy, add a positive integer specifying the number of significant digits after "confrac." For example:
(14 + sqrt(3))/5 confrac, 3 → [3; 6; 1; 4]
(14 + sqrt(3))/5 confrac, 3, fraction → 3 + 1/(6 + 1/(1 + 1/4))
# If you expand a function as a continued fraction, Mathcad returns a second column containing the powers of x corresponding to the terms.
sin(x) confrac → [0, x; 1, x^2; 6, x^2; -10/7, x^2]
# This corresponds to the continued fraction
sin(x) confrac, fraction → x/(1 + x^2/(6 + x^2/(-10/7)))
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