# Title: About QuickSheets
# Description: How to use QuickSheets.
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# quicksheets
## ABOUT QUICKSHEETS
# Welcome to QuickSheets - full-featured Mathcad worksheets that:
# •  Give you ready-made Mathcad templates that you can customize to perform a wide range of mathematical tasks, from solving equations to graphing and calculus.
# •  Show you how to use some of Mathcad's special features, like programming and scripting.
# How to Use a QuickSheet
# Although all the QuickSheets have some suggested starting parameters, you can quickly edit highlighted definitions to customize the calculation. For example, here's part of a QuickSheet that performs basic matrix operations:
# Operations on a Square Matrix
# Performs transposition and inversion; finds determinant, eigenvalues, and eigenvectors.
# Enter a square matrix with real values:
M := [8, 7, -3, 2; 7, 1, 0, 4; -3, 0, -5, 9; 2, 4, 9, 2]
# Matrix inverse:
M^-1 = [
    -0.00205186, 0.131505, -0.0514829, -0.0292856;
    0.131505, -0.155568, 0.0268607, 0.0587577;
    -0.0514829, 0.0268607, -0.0190263, 0.08338;
    -0.0292856, 0.0587577, 0.08338, 0.0365603
]
# Matrix transpose: | Determinant:
transpose(M) = [8, 7, -3, 2; 7, 1, 0, 4; -3, 0, -5, 9; 2, 4, 9, 2]
|M| = 5361
# If you enter (or copy) your own matrix into the definition for variable M, highlighted above, the QuickSheet automatically performs all the calculations on your data.
# The initial parameters for many of the QuickSheets are contained in data files, which are saved in Mathcad with the Data Table component. You may quickly reuse these QuickSheets by substituting your own data files. You can also edit the data inside the component in the worksheet by clicking on it. If you right-click on the component you can use the menu to choose to substitute a new data file.
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