# Title: Mathsoft Controls
# Description: Basic usage of the Mathsoft Custom Controls.
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# PROGRAMMING
# quicksheets
# Mathsoft Controls
# This worksheet demonstrates basic usage of the Mathsoft Custom Controls, such as drop-down lists, sliders, buttons, and text boxes.
# To insert a new control, click in blank space and from the Insert menu choose from the Control drop-down list, or use the Controls toolbar.
#
# •  To see or modify the script that drives a control, right-click the control and choose Edit Script from the menu.
# •  To modify the appearance of a control, right-click the control and choose Mathsoft (name) Control Object > Properties from the menu.
# •  To add another output or input variable, right-click the control and choose Add Input Variable or Add Output Variable. One output variable (to the left of the definition sign) is created by default.
# •  To export a control that you have modified for repeated use in other worksheets or for sharing with other Mathcad users, right-click the component and choose Export as Component. The control you have customized now appears on your Insert Component list.
# Information about scripting the controls can be found in the Developer's Reference under the Help menu. Several examples follow.
# Note: If you want to view the scripts for these controls, save the file and open it in your Worksheet window, not in the Resources window.
## Mathsoft Slider
# Move the slider and watch the output change.
# [component: outputs slope]
slope = -3
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## Mathsoft List Box
# You can return the item number or convert the selection to a string.
# [component: outputs Material]
Material = "Cast Iron"
# The script of the second list box contains the available property definitions for each material, and the list is populated based on the material you choose.  Note the use of Input and Output variables.
# [component: inputs Material; outputs [Species; tension]]
Tension := tension*psi
Tension = 0.137895 MPa
# Select different choices in the two list boxes, and examine the outputs.
## Material List Box
# This list box takes user input in the form of a selection and returns the value as a string, which you can see displayed above. Note that the starting state of the list box is set outside the Start event, which is the default behavior of list boxes. This assures that the list box is populated and an initial selection is made upon opening the worksheet and enabling the controls. If you wish to effect changes in the contents of the list based on other events in the worksheet, you have to move this code inside the Start event subroutine.
## Species and Tension List Box
# This list box is populated based on the selection made in the first list box. In particular, note the line:
# mats = Worksheet.GetValue("Material")
# just above the string definitions. This indicates that the string definitions are dependent on the Material value selected. But, notice, too, that there is no need for an input variable. The list box "knows" about the variable "Material" and can use it for calculations within its script.
# Warning: Don't try to set the value of a variable in a control's script if that variable is defined as an Input Variable. For example, in the Properties list box above, do not call SetValue("Material"), since Material is defined as an Input to the list box. In addition, if you are getting a worksheet value using GetValue, you must add that value as an Input Variable as well, so that the worksheet recalculates in an appropriate order.
## Mathsoft Buttons
# Push Button style
# You can use the Push Button to perform calculations on input and deliver feedback to the user. In this example, two vectors are compared.
student := [1; 2; 4; 2; 3]
teacher := [1; 2; 4; 2; 2]
# [component: inputs [student, teacher]]
# Check Box style
# [component: outputs nonlin]
nonlin = 0
f(x) := x + 5 + nonlin*x^2
f(32) = 37
# Radio Button style
## Example 1: Controlling Seed Value in Generating Random Numbers
# This program allows you to control the process of generating a set of random numbers based on a particular Seed value.
n := 1*10^3
μ := 0
σ := 2
DiffNormal(n, μ, σ, s) :=
    Seed(s)
    nums ← rnorm(n, μ, σ)
    nums
# You can graph the distribution for each value of seed to see the effect:
# [component: outputs sel]
# [component: outputs sel]
# [component: outputs sel]
# [component: outputs sel]
# [component: outputs sel]
# [area: graph parameters]
bin := 20
M := DiffNormal(n, μ, σ, sel)  # error: This value must be a positive integer.
sel = 0
lower := floor(min(M))
upper := ceil(max(M))
h := (upper - lower)/bin
j := 0 .. bin
int[j] := lower + h*j
int := int + 0.5*h
F(x) := n*h*dnorm(x, μ, σ)
Q := hist(int, M)
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# Mathsoft Text Box
# [component: outputs var]
var = 5
var*3 = 15
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## Automation and Controls
# Mathsoft controls call variables in the Mathcad Worksheet using the Automation methods outlined in Help > Developer's Reference under Accessing Mathcad from Another Application. This reference provides the complete set of objects and methods that can be accessed from within a control.
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