# Title: Mathsoft Controls: Finding Local Extrema
# Description: Finding local extrema using slider and textbox controls to manipulate a secant line.
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# PROGRAMMING
# quicksheets
# Mathsoft Controls: Finding Local Extrema
# In this example, sliders are used to move a secant line along a curve to determine the positions of the local extrema to two decimal places of precision. Text boxes above the sliders allow the user to specify what range to inspect and what step size to use in the sliders. Text boxes below the sliders display the exact values of the sliders' outputs.
# [component: outputs xleft]
# [component: outputs xright]
# [component: outputs step]
f(x) := x^3 - 6*x^2 + x + 10  # Change these highlighted definitions.
# position of x1 | position of x2
# [component: inputs [xleft, xright, step]; outputs x1_position]
# [component: inputs [xleft, xright, step]; outputs x2_position]
# [component: inputs x1_position]
# [component: inputs x2_position]
# [area: area containing calculations]
g(x) := d/dx(f(x))
m_tan := g(x1_position)
b_tan := f(x1_position) - m_tan*x1_position
m := (f(x1_position) - f(x2_position))/(x1_position - x2_position)
tangent(x) := m_tan*x + b_tan
b := f(x1_position) - m*x1_position
sectan(x) := if(x1_position == x2_position, tangent(x), m*x + b)
slope := if(x1_position == x2_position, m_tan, m)
## Graph of function and secant or tangent line
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slope = -3.77
# All control regions have hidden arguments to give a clean appearance to the worksheet. To reveal them, right-click a region and choose Show Arguments from the menu.
# All text boxes have been formatted using their Properties dialog boxes. To inspect these formatting choices, right-click a text box and choose Mathsoft TextBox Control Object > Properties. In particular, note that the highlighted text boxes are editable (Read-only is checked) and the text boxes below the sliders are not. This is because the top text boxes are for entering text and the bottom text boxes are for displaying text.
## The Highlighted Text Boxes
# Each highlighted text box simply takes user input and returns the value as a string, which is its default behavior. To see this, type "step=" for example, next to or below the text box.
## The Sliders
# Each slider has three inputs, x_left, x_right, and step, defined by user input to the text boxes above them. These are referred to as Inputs(0), (1), and (2) in the script. These inputs are strings, which are converted to and used as numbers in the script:
# With slider
# .minrange=Inputs(0).value/Inputs(2).value
# .maxrange=Inputs(1).value/Inputs(2).value
# A default slider uses integer minimum, maximum, and step size values. So, if you want to get decimal values out of a slider, you must convert the set values or inputs using division:
# reciprocal=1/Inputs(2).value
# Outputs(0).value=(slider.position/reciprocal)
# Here the slider position is divided by the step size set by the user, and the output is a number.
## The Display Text Boxes
# Each display text box takes the output from a slider and displays it as a string concatenated to a sentence that describes the value as an x-position on the graph.
## The Graph
# The graph uses the output from the sliders to display points along the curve. To see how the graph is constructed, expand the hidden area above it by right-clicking the area and choosing Expand from the menu.
# It is often helpful to hide calculations associated with output from controls to allow for a neat presentation of the principal ideas of the worksheet.
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