# Title: Using the Excel Component
# Description: Using the Excel component in Mathcad.
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# MATHCAD AND OTHER APPLICATIONS
# quicksheets
# Using the Excel Component
# This QuickSheet illustrates working with an Excel component in Mathcad. It only computes if you have Excel 7.0 or higher loaded on your computer.
# In 1848 Rudolph Wolf devised a daily method of estimating solar activity by counting the number of individual spots and groups of spots on the face of the sun.  The Excel spreadsheet shown contains annual totals of sunspots from 1700 to 1995.
# Tip: Double-click on the Excel component to activate it in-place. Activating the component opens the Excel environment to allow you to edit the data.
# [component: outputs [years; counts]]
# Tip: To change the component's properties, right-click on it then choose Properties from the menu.
# Once this data has been embedded in your Mathcad worksheet, you can use it as you would data or variables that are native to the worksheet itself.
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# You can return the count for a particular year by specifying a year to find in the first column, sending that year value to Excel, and using a macro, return the sunspot count for that year.
# Enter a year for which you'd like to find a sunspot count:
year := 1701
# [component: inputs year; outputs count]
count = 11
# You could, of course, also do this with a Mathcad lookup function and the original data:
vlookup(year, augment(years, counts), 1)[0] = 11
# Sunspot counts rise and fall approximately every 11 years. The cycle is not symmetric: the spot count takes about 4 years to rise from a minimum to a maximum and another 7 years to fall to a minimum once again. The largest annual mean number (190.2) occurred in 1957.
# Confirm the above statistics using Mathcad plotting and statistical functions, starting with the Excel spreadsheet of annual totals of sunspots from 1700 to 1995.
max(count) = 11
# Inspecting 44-year sections of the total sample, the pattern of a 4-year rise to a maximum and a 7-year decline to a minimum is much more evident.
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# ~ 11 years between minimum values
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# ~ 11 years between maximum values
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# ~ 4 years from the minimum to the maximum
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# ~ 7 years from the maximum to the minimum
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