# Title: Thermocouple Conversion Formula
# Description: Mathcad worksheet used in Thermocouple.xls.
## Thermocouple Conversion formula
top_order := 5
bottom_order := 7
K := [
    0.03927540;
    25.8924978;
    11.870373068;
    1.93929541025;
    0.13213476957;
    3.1522939338*10^-3;
    0.48843900756;
    0.08712089512;
    6.7951066226*10^-3;
    2.10023173868*10^-4;
    8.63513603365*10^-7;
    -5.27007957758*10^-8;
    1.4297419194*10^-9
]  # disabled
C(mV, K) := sum(K[n]*mV^n, n = 0 .. top_order)/(1 + sum(K[n + top_order]*mV^n, n = 1 .. bottom_order))
temp := C(voltage, K)  # error: bad_variable mc_voltage mc_voltage value_zone
temp =  # error: bad_variable
# Note: This worksheet was written for use with the Excel workbook thermocouple.xls. This worksheet relies on Mathcad's automation interface to provide the value of K from Excel, and returns an error when opened in Mathcad. To see how this worksheet would calculate from within Excel, enable the definition of K, above.
