# Title: Extra Math Symbols
# Description: Characters from the Symbol and extended Times New Roman fonts for use as operators or in naming functions.
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# MATH SYMBOLS
# quicksheets
# Symbols
# This QuickSheet provides characters from the extended Times New Roman fonts, which can be reused for operators or user-defined functions. You can switch the math fonts to other fonts, by clicking on a character and changing the font.
# To add other special characters:
# 1.  Open Character Map in your Programs > Accessories > System Tools.
# 2.  Select and copy the character you want to use.
# 3.  In Mathcad, choose Paste Special from the Edit menu, then choose "Unformatted Text as Math."
# °C | °F | || | /°F | /°C
# ∑ | ∏ | ∀ | ∃ | ℒ
# Å | ∝ | ∅ | ƒ | ∙
# ∂ | ∩ | ∪ | ⊃ | ⊇
# ∈ | ∉ | ⊆ | ⊂ | ⊄
# ≈ | ÷ | ± | × | √
# ∠ | ∡ | ⊗ | ⊕ | ⊙
# £ | ¥ | $ | € | ¢
↔
←
→  # ↑  # ↓
# ⇔ | ⇐ | ⇒ | ⇑ | ⇓
# È | Æ | ℘ | ℑ | ℜ
# § | ® | ö | ð | ‡
# ℵ | Þ | Ð | ϒ | ↵
# ♣ | ♥ | ♠ | ♦ | Œ
# ¹ | ² | ³ | ℤ | ℧
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