# Title: Part III: Animating 2D Graphs
# Description: Changing plots in real-time.
# Worksheet setting: ORIGIN = 1
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# FEATURES IN-DEPTH
# tutorials
# Part III: Animating 2D Graphs
# Mathcad's animation feature allows you to see a plot change in real time, as the value of a variable changes.
# Open a new worksheet, then resize it and the Resources window so you can see both next to each other. Do the exercises below in your Worksheet window.
# Here are the topics covered in this tutorial:
# To Set Up an Animation
# To Animate the Graph
# To Animate the Graph of a Sine Curve
## To Set Up an Animation
# Animation is based on the built-in variable FRAME, always written in capital letters. To create an animation, use FRAME as the variable that you want to change over time in your function and plot definitions, as shown below.
# This parabola gets steeper as FRAME increases. FRAME is divided by 4 to make the changes more gradual.
f(x) := FRAME/4*x^2
x := -3, -2.99 .. 3
# Define a range variable
# for graphing.
# Hint: To define a range variable.
# Before you animate, create the graph, as shown below with a value of FRAME at 0. See equation above.
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# When animating a graph, manually set the limits on your graph so that they won't automatically change during playback:
# 1.  Click on the graph.
# 2.  Click on the upper- and lower-limit placeholders for each axis (4 placeholders in all), and enter new values.
# The graph shown is already set with  -3 and 3 for the x-axis limits and 0 and 7 for the y-axis limits.
## To Animate the Graph
# Be sure to set up your worksheet by defining the variable driving the animation in terms of FRAME. See above.
# 1.  Choose Animation > Record from the Tools menu to bring up the Record dialog box. Move the dialog box so that it does not obscure your graph.
#
# 2.  Click and drag around the graph so that a dashed rectangle appears around it.
# 3.  Set the number of FRAMEs by filling in the From, To, and At boxes in the Animate dialog box. By default, FRAME goes from 0 to 9 at 10 frames per second, so that the whole animation lasts one second. You may change the range and speed to whatever numbers you like. The more values of FRAME you allow, the longer the animation takes to create and run.
# 4.  Click Animate in the dialog. As the animation is processed, you see a small thumbnail in the dialog that lets you know if it is working correctly.
# 5.  A playback screen appears with some controls at the bottom. Press the Play button.
# 6.  Once you are satisfied with your animation, you can save it as an .AVI file by clicking "Save As" in the Animate dialog.
## To link the AVI file to your worksheet
# 1.  Click in the worksheet, then choose Object from the Insert menu.
#
# 2.  Click on "Create From File" in the dialog box and check the box that says Link.
#
# 3.  Browse to your animation file, which ends in .AVI.
#
# 4.  You can choose to import the animation or check the box to have it launch from an icon.
#
# 5.  Once the animation is imported into the file, you can position it onto your worksheet.
# The animation for the graph of the parabola is shown below. Double-click  it to play it. Press the black Stop button then use the scroll bar to replay it more slowly.
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## To Animate the Graph of a Sine Curve
# Here's another example of a simple animation. Let FRAME run from 0 to 59 to draw one cycle.
θ := 0, π/60 .. (FRAME + 1)/60*2*π  # Define a range of values.
# Make the graph of sin(θ):
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# Follow the steps outlined earlier in this section to make the animation shown below.
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# Below is another animation of a sine curve with increasing frequency. Set FRAME from 0 to 59 again to draw one cycle. Remember to first select Animation > Record from the Tools menu, then drag across the regions to record for the animation.
f(x) := sin(FRAME*2*π*x)
FRAME = 0
a := FRAME
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f(x) := sin(a*2*π*x)
a = 0
# The finished animation is shown below. You can replay or slow down through the scroll bar. This time we included the changing values for a and the equation.
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# For more details and examples of creating animations in Mathcad, see Mathcad Techniques.
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