# Title: Vector and Matrix Calculation Strategies
# Description: Changes to calculation behaviors regarding vectors and matrices.
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# MIGRATION GUIDE
# tutorials
## Vector and Matrix Calculation Strategies
# Mathcad 12 through 14 make some changes to calculation behaviors so that the same construct produces the same results regardless of where it is used. These changes introduced some incompatibilities between different versions of Mathcad. Some bugs in previous versions have been corrected. This worksheet catalogs changes and demonstrates ways to make calculations consistent and clear.
## Determinant Operator
# MC11: Determinant/absolute value operator autodetects shape of argument.
# MC12 and higher: User right-clicks to select the algorithm.
# The same operator is used for the determinant and the absolute value and vector norm operator. These two types of operations have very different argument restrictions and unit behaviors. It is necessary, given the static unit balancing introduced in Mathcad 12, to know which operation is meant.
#
# Mathcad tries to choose the correct functional meaning of this operator. The default is absolute value or norm when Mathcad cannot detect the shape of the argument, such as when it is used in a function definition. A matrix argument produces the result, "This value must be a scalar or a vector." Right-click on the vertical bar operator and choose Square Matrix Determinant from the menu to specifically choose one dimensional meaning over the other.
M := [23.5, 67.3, 2; 0, 0.34, 1.1; .76, 3.1, 7]
|M| = 31.541
det_new(x) := |x|
det_new(M)
det(x) := |x|  # Right-click on the vertical bars in the function definitions to see the functionality selection.
det(M) = 31.541
## Performance and Calculation Speed
# MC11, MC13, and MC14: Preallocating matrices is recommended in programs.
# MC12: Preallocating matrices is required in programs.
# Worksheets that create large, unallocated matrices in programs take longer to calculate in Mathcad 12, as these programs are not optimized. While these optimizations have been restored, there are still strategies you can follow to speed your execution in any version of Mathcad. A Performance QuickSheet documents these strategies.
## Solve Blocks Find Whole Vectors
# MC11: Solve blocks can solve for single element of a vector; results are misleading.
# MC12 and higher: Solve blocks only solve for whole vector or use scalar parameters.
# In Mathcad 11 and previous versions, you can define a vector of unknowns in a solve block, then solve for a single element from that vector. Internally, Mathcad 11 solves for all the elements in the vector, not just the element requested in the Find or Minerr function, although it only returns the requested value. It is unclear what the results mean, since all the vector elements change to find the solution, although only one element is returned. In Mathcad 12 and higher, you can only solve for the whole vector, so there is no ambiguity in the result. The following works:
v := [2; 1]
Given
v[0]^2 + v[1]^2 == 7
v[0] + v[1] == 3
v := Find(v)
v = [2.61803; 0.381966]
# This method does not work:
v := [2; 1]
Given
v[0]^2 + v[1]^2 == 7
v[0] + v[1] == 3
v0 := Find(v[0])  # error: Something is wrong with the solve block used to define this function. It may need a guess value.
# To solve for a single element and hold other values constant, use individual variable names.
## Simultaneous versus Sequential Multiple Array Assignments
# MC11: Array assignments of interdependent variables are evaluated sequentially.
# MC12 and higher: Array assignments of interdependent variables are evaluated simultaneously.
# Multiple assignments are two or more interdependent variable assignments made within an array. Mathcad 12 and higher versions make all assignments simultaneously, without considering the results of other assignments within the region. Mathcad 11 performs assignments sequentially. Consider this simple case:
# MC12 and higher | MC11
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a := 1
b := 2
a = 1
b = 2
[a; b] := [b; a]
a = 2
b = 1
# Mathcad provides a Compatibility tab under Worksheet Options to let you choose behavior to match a version of Mathcad. We recommend breaking apart such assignments so that you get the desired result, regardless of version and independent of the switch.
a := 1
b := 2
a = 1
b = 2
a := b
b := a
a = 2
b = 2
# Calculate difference equations inside a program loop, where you can specify order of operations. The following multiple assignment works under Mathcad 11 rules, but shows the error "This array index is invalid for this array" in higher versions of Mathcad.
i := 1 .. 10
a[0] := 2
b[0] := 3
[a[i]; b[i]] := [3 + a[i - 1] - .6*b[i - 1]; b[i - 1] + 0.2*a[i]]  # error: This array index is invalid for this array.
# The difference equations can be rewritten as
[a1; b1] :=
    [a[0]; b[0]] ← [2; 3]
    for i ∈ 1 .. 10
        a[i] ← 3 + a[i - 1] - .6*b[i - 1]
        b[i] ← b[i - 1] + 0.2*a[i]
    [a; b]
# Simultaneous assignment corresponds to the order of assignment behavior locally in programs for all versions of Mathcad.
al ← 1
bl ← 2
[al; bl] ← [bl; al]
= [2; 1]
## Array Elements Must Exist Before They Can Be Referenced
# MC11: Assigning an indexed array to itself for undefined elements zero-pads the array.
# MC12 and higher: Undefined array elements can not be used in any context. Assign the last desired element to zero-pad the array.
# In Mathcad 11, you can zero-pad the end of an array by referencing undefined array elements. Mathcad 12 and higher versions prohibit this behavior, giving the error "This array index is invalid for this array." This behavior is consistent with the treatment of references to undefined array values in other contexts.
x[0] := 1
i := 0 .. 2
x = [1]
x[i] := if(i < 3, x[i], 1)  # error: This array index is invalid for this array.
# Nor can you use
x[i] := x[i]  # error: This array index is invalid for this array.
# This behavior works in previous versions if the right-hand side is assigned to a vector of the same name - evaluating it results in the index error. To accomplish the same thing, assign the last desired index of the array to 0.
y[0] := 1
y[2] := 0
y = [1; 0; 0]
## Matrices Cannot Contain Functions and Scalars
# MC11: Any Mathcad types can be mixed as array elements.
# MC12 and higher: Mathcad array elements must be either values or functions, and functions must have the same signature.
# In Mathcad 11 and previous versions, you can put both functions and scalar or array values into the same matrix. Mathcad 12 and higher require consistent types to be used in a matrix, to increase calculation speed and improve clarity of notation. The following are allowed:
x := 2
B1 := [x; 2i]
B2 := ["string"; 3]
B3(x) := [x^2; 2]
# But incorporating the name of a function as an element mixed with scalars is not allowed:
[sin; 2] =  # error: The forms of these values must match. This value has the form: ƒ(Unitless) → Unitless, but others have the form: Unitless.
B4 := [sin; cos]  # is allowed, because B4 is now a list of only functions.
# To extract functions from the list, refer to their element index:
q := B4[0]
q = ƒ(Unitless) → Unitless
q(30*deg) = 0.5
# All functions in an array must have the same signature, that is, they must take the same number and type of arguments and have the same unit behavior.
## Singular Value Functions Replaced
# MC11 and MC12: svd and svds functions find U, V and singular value vector, respectively.
# MC13 and higher: svd2 function packs results into a single nested vector, making it easier to use results.
# The svd and svds functions were designed before nested matrices were available in Mathcad. Although these functions are still available in Mathcad for backward compatibility, we recommend using the svd2 function. The svd2 function returns the singular value vector as the first nested result, the U matrix as the second nested result, and the transpose of the V matrix as the third nested result, making it much simpler to construct the defining equations:
M1 := [2, 4i; 1, 7 + 6i]
[s; U; VT] := svd2(M1)
U*diag(s)*VT = [2, 4i; 1, 7 + 6i]
# The svd2 function also accepts complex matrices for an additional function enhancement.
## Order of evaluation of matrix elements
# MC11: Matrix elements are evaluated row-wise.
# MC12 and higher: Matrix elements are evaluated column-wise.
# Matrix elements containing expressions are evaluated in a column-wise order in Mathcad 12 and higher versions. This can be an issue if you have created interdependent local assignments to create matrix elements. For example,
[(P ← 1), (Q ← 2); Q, P] =  # error: This variable is undefined.
# worked in Mathcad 11, but fails now because the Q in the first column is not defined until the first element of the second column.  The following expression works:
[(P ← 1), Q; (Q ← 2), P] = [1, 2; 2, 1]
# If you need to reuse values in a matrix, we recommend defining them first before assembling the matrix, for clarity of notation and independence from order of evaluation.
P ← 1
Q ← 2
[P, Q; Q, P]
= [1, 2; 2, 1]
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