# Title: Changes to Symbolics in Mathcad 14
# Description: This tutorial describes the changes to Mathcad resulting from an extensively update symbolic calculation engine. Mathcad now returns symbolic results for a wider range of functions and more detailed results for piecewise or periodic solutions.
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## MIGRATION GUIDE
# tutorials
## Changes to Symbolics in Mathcad 14
# Mathcad 14 features an extensively updated symbolic calculation engine. Mathcad now returns symbolic results for a wider range of functions and more detailed results for piecewise or periodic solutions.
# The following sections describe changes to the behavior of Mathcad 14 that you should be aware of.
# Changes to Symbolic Results
# Changes to Definite Integrals Involving Substituted Variables
# Symbolic Inner Product Now Displays Complex Conjugates
## Changes to Symbolic Results
# Mathcad 14 returns some symbolic results in different, but equivalent, forms than in previous releases. The following are examples of this:
## Mathcad 14
## Mathcad 13
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x^2 - 2 == 0 solve → [-sqrt(2); sqrt(2)]
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d/dx(x^2*sin(x)) → x^2*cos(x) + 2*x*sin(x)
# The new modifier "fully" enables you to return much more detailed answers than with previous versions. The following example shows the result of solving a polynomial with and without the modifier "fully."
(3*a - 7)*x == 1 solve, x → 1/(3*a - 7)
(3*a - 7)*x == 1 solve, x, fully → {
    1/(3*a - 7) if a ≠ 7/3
    undefined if a == 7/3
}
# Adding the modifier "fully" after solve returns a detailed solution that includes cases in which the solution is undefined, or takes a simpler form, based on the values of the coefficients of the original polynomial.
# In some cases, Mathcad might return more detailed solutions than those returned by previous versions of Mathcad, even if you do not add the modifier "fully." However, you can still use these results to define functions or variables.
f(a) := (3*a - 7)*x == 1 solve, x, fully →  # error: This variable is undefined.
f(1) → undefined
f(7/3) → undefined
## Changes to Definite Integrals Involving Substituted Variables
# In Mathcad 14, if you take the definite integral of an expression with respect to a variable x, and the expression contains a different variable, such as A, that is defined to be equal to x, Mathcad correctly treats A as the variable of integration. This differs from the behavior of Mathcad 13, which treats A as a constant in the integration. For example, compare the following results.
## Mathcad 14, 12 and 11
## Mathcad 13
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A := x  # error: This variable is undefined.
integral(A, x = 0 .. 1) → 1/2
# Mathcad 14 replaces A with x in integral, and returns the same result as the following:
integral(x, x = 0 .. 1) → 1/2
# Note: The Mathcad 14 behavior for these types of integrals is the same as the behavior in Mathcad 11 and 12.
## Symbolic Inner Product Now Displays Complex Conjugate Signs
# When you take the inner product of two symbolic vectors in Mathcad 14, the result is displayed with complex conjugate bars over the variables in the second vector. This differs from the Mathcad 13 behavior, in which conjugate bars are not displayed in the inner product.
## Mathcad 14
## Mathcad 13
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[a; b]*[x; y] → a*conj(x) + b*conj(y)
# Note that this change only applies to vectors containing undefined variables. When taking inner products of numerical vectors, both Mathcad 13 and 14 correctly apply complex conjugates to the entries of the second vector. For example, suppose you define.
a := 1
x := 3i
b := 2
y := 1
# Both Mathcad 14 and Mathcad 13 return the correct result.
[a; b]*[x; y] → 2 + (-3)*1i
# In Mathcad 14, this result is consistent with taking the symbolic inner product and substituting the values of the variables:
[a; b]*[x; y] substitute, a == 1, b == 2, x == 3i, y == 1 → 2 + (-3)*1i
# This fixes a bug in previous versions, in which the above calculation returned the incorrect 2 + 3i.
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