# Title: Units in Functions and Operators
# Description: Effects of changes to unit checking on worksheets.
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# MIGRATION GUIDE
# tutorials
# Units in Functions and Operators
# Mathcad 12 introduced static unit and type checking. All regions are unit balanced and checked for type (vector, scalar, function, and so on) consistency before they execute. Checking before evaluation offers gains in performance and consistency of operation. Doing so can cause some differences in your worksheets from earlier versions of Mathcad.
## Functions That Don't Unit Balance Throw an Error When Defined
# MC11: Functions return unit errors when evaluated.
# MC12 and higher: Functions return unit errors when defined or evaluated.
# You may notice that functions must unit balance when they are defined, not when they are executed. Click on the definition below to see the error message.
f(x) := x + 1*m + 1*s  # error: This value has units: Time, but must have units: Length.
# Because Mathcad no longer checks units while processing a calculation, you can not define a program or function that depends on a numeric value to determine the units of the output. The units in the following definition cannot be balanced without running it.
f2(x) :=
    cm^2 if x < 0
    cm^3 otherwise  # error: The forms of the possible return values must match. The first has the form: Length^2, but the second has the form: Volume.
# In some cases, the program may appear correct when you enter it, but returns an error when executed.
prog(Area, Length, adj) :=
    Vol ← Area*Length
    factor ←
        2.5 if adj ≥ 3
        2.1 if adj == 2.1
        1.7 if adj < 2
    Vol*factor
prog(2 m^2, 4 cm, 2) =  # error: Encountered a floating point error.
# Here, the problem arises from the omission of an otherwise from the if block. There are conceivable values of adj (for example, 2.5) that "fall through" the definition of factor, Mathcad assumes the definition of factor comes from the previous definition — in this case, Vol. This results in an inconsistency in units of the return value: if an acceptable value of adj is supplied, the program returns units of m^3; if the value of adj causes the definition of factor to fail, the program returns units of m^6.
# More information on the use of otherwise to avoid definition errors in programs can be found on the Conditional If Statements QuickSheet.
## Static Unit Checking
# With static unit checking, you also can not conditionally switch the output of a function based on the units of the arguments. This means you cannot use on error to trap unit errors or automatically add units if the arguments don't have them.
add_meters(x) :=
    try
        x + m
    on error
        return x*m
    return x  # error: The forms of the expression and its error handler must match. The expression has the form: Length, but the handler has the form: Length^2.
# The error messages are specific about which dimensions and types don't match. Click on each expression to see the message.
# For the same reasons, you cannot define a function that returns a different type of result depending on the value of its argument.
f4(x) :=
    sin if x < 0
    1 otherwise  # error: The forms of the possible return values must match. The first has the form: ƒ(Unitless) → Unitless, but the second has the form: Unitless.
# You cannot mix functions and values, either in a function definition, or in matrix entries.
## Functions Valid Only for Unitless Arguments
# MC11: Functions can conditionally return results of different units depending on input values.
# MC12 and higher: Functions must return units depending only on the units of the inputs.
# Some functions may only be valid for unitless arguments in Mathcad 12 and higher versions that are valid for arguments with units in previous versions. For these functions, units on inputs cause the units of the output to vary based on the numerical values of one or more of the inputs, which doesn't correspond to a correctly unit-balanced equation.
f3(x) :=
    x^2 if x < 0
    x^3 otherwise
# These functions will not execute if you use expressions with units in the arguments. Click on each error to see the new error messages.
f3(2) = 8
# works, but
f3(2*m) =  # error: This value has units: Length, but must have units: Unitless.  # fails.
pow(x, n) := x^n
pow(2, 3) = 8
# works, but
pow(2*m, 3) =  # error  # fails.
tu(x) :=
    try
        x + m
    on error
        x
tu(1*m) = 6.56168 ft  # works, but
tu(2) =  # error: This value has units: Unitless, but must have units: Length.  # fails.
# As a general rule, for a function to be valid in Mathcad 12 through Mathcad 14, the units of the result must depend only on the units of the arguments to the function. Trace Error does not work in these cases, because the error is caused by evaluation of the function with units in the arguments, not by the function definition itself.
## Exponentiation and Differentiation Operators need Explicit Power and Order with Arguments with Units
# MC11: Values with units can be raised to a variable power.
# MC12 through MC14: Values with units can be raised to an explicit numeric power.
# To unit balance an exponent or derivative equation before evaluation, the units of the result must depend only on the units of the arguments, not on the numeric value of the arguments. Explicit values are needed to calculate the powers of a quantity with units.
ex := 3
anum := 2*sec
anum^3 = 8 s^3
# but
anum^ex =  # error: The exponentiation operator requires a constant exponent when applied to a value with units.  # gives an error
# This error message says that you can only raise a unitless value to a variable power. You also need to provide explicit values for the order of an nth-order derivative of a dimensioned value.
pos(t1) := 3*m*sin(t1/sec)
ord := 2
t1 := 2*sec
d^2/dt1^2(pos(t1)) = -8.94978 ft/s^2  # but
d^ord/dt1^ord(pos(t1)) =  # error: The order of the derivative must be a constant between 1 and 5 when this operator is applied to an expression with units.
# gives an error
# The error message is telling you that you can only take a variable-order derivative with respect to a unitless argument of a function.
## 2D Plots Require Matching Units in Axes and Markers
# MC11 and MC12: Axis limits and markers in 2D plots can have mismatched units.
# MC13 and MC14: Axis limits and markers in 2D plots are required to have the same units.
# To scale plots correctly in the current worksheet system base units, a plot must use consistent dimensions for values that determine the scale of an axis. Axis limits and markers on a plot, if they use units, must have consistent units. You may find that plots that display in Mathcad 11 and 12 return unit errors in Mathcad 13 and 14.
x_p := 2.3*s
f(x) := -(x_p - x)^2*g + 40*m
i := 0 .. 10
x[i] := i/2*sec
y[i] := f(x[i])
peak := f(x_p)
peak = 131.234 ft
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# The problem with the plot above is that the y-axis limits are set to unitless values, 150 and -150, and the marker has units of length. You can either add units to the plot limits or divide the units from the marker to display the plot.
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# The units on markers and axis limits do not have to match the units on the axis arguments, since multiple arguments can have different units in Mathcad plots. We recommend that in these cases you normalize all values to be unitless, since this is the most correct and consistent way to compare values, which allows you to specifically define the scaling.
# In the case where all axis arguments have the same units, we recommend that you make units on plot limits and markers match the argument units, for easy interpretation of scaling. Plots do not follow unit simplification rules, so all units will be reduced to the base dimensions of the system. This automatic scaling can result in surprising values on numbered plots. For example,
# Default evaluation
# Default graph scaling
y2[i] := i*lbf
y2 = [0; 1; 2; 3; 4; 5; 6; 7; 8; 9; 10] lbf
y2 = [0; 32.174; 64.3481; 96.5221; 128.696; 160.87; 193.044; 225.218; 257.392; 289.566; 321.74] lb*ft/s^2
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# Although the default simplification for force in the US unit system is lbf, graphs will simplify to the 7 base units.
lbf = 32.174 lb*ft/s^2
# In this case, graphs have default scaling that is approximately 32 times larger than the default simplified unit.
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