# Title: Gradient Operator and Jacobian Function
# Description: This tutorial introduces a new Mathcad gradient operator, which computes the gradient of a real valued function, and a new function, Jacob, which computes the Jacobian of a vector function.
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## NEW FEATURES
# tutorials
# Gradient Operator and Jacobian Function
# Mathcad 14 introduces a gradient operator, which computes the gradient of a real valued function, and a new function, Jacob, which computes the Jacobian of a vector function.
## Gradient Operator
# The gradient operator computes the gradient of a real valued function. To insert the gradient operator, press [Ctrl] [Shift] G.
∇[□](□)
# The gradient operator has two placeholders: the lower placeholder contains the variable or variables in the problem. The upper placeholder contains the function on which you are taking the gradient.
# You can enter the variables as a comma-separated list, as in the following example.
f(a, b, c) := a*b + e^(a + b*c)
∇[a, b, c](f(a, b, c)) → [b + e^(a + b*c); a + c*e^(a + b*c); b*e^(a + b*c)]
# Note that because the variables are numerically undefined, you must evaluate the gradient with the symbolic equal sign.
# Alternatively, you can enter a single variable name, representing a vector of subscripted variables, and write the function in terms of the subscripted variables.
g(x) := x[0]*x[1] + e^(x[0] + x[1]*x[2])
∇[x](g(x)) → [e^(x[1]*x[2] + x[0]) + x[1]; e^(x[1]*x[2] + x[0])*x[2] + x[0]; e^(x[1]*x[2] + x[0])*x[1]]
# If you define x numerically, the gradient is a vector of numbers.
x := [1; 3; -1]
∇[x](g(x)) → [e^-2 + 3; 1 - e^-2; 3*e^-2]
# You can also evaluate the gradient with the equal sign.
∇[x](g(x)) = [3.13534; 0.864665; 0.406006]
## Jacobian
# The function Jacob computes the Jacobian of a vector function, written as a column vector of real-valued functions. Jacob takes two required arguments:
#
# •  A column vector of real-valued functions
# •  A vector of subscripted variables with respect to which the Jacobian is computed.
#
# If you assign numerical values to the variables, you can evaluate the Jacobian numerically. However, if any of the variables is undefined numerically, you can only evaluate the Jacobian symbolically.
# The following example illustrates how to use Jacob.
x := x
F(x) := [x[0]^2*x[1] + x[1]^2*x[2]; sin(x[0]*x[1])]
# In this example, the vector of functions contains two real-valued functions:
f[1]*x == x[0]^2*x[1] + x[1]^2*x[2]
f[2]*x == sin(x[0]*x[1])
# The Jacobian has the form
[
    d/d(x[0])(f[1]), d/d(x[1])(f[1]), d/d(x[2])(f[1]);
    d/d(x[0])(f[2]), d/d(x[1])(f[2]), d/d(x[2])(f[2])
]
# Since the variables are undefined numerically, you must evaluate Jacob symbolically.
Jacob(F(x), x) → [2*x[0]*x[1], x[0]^2 + 2*x[1]*x[2], x[1]^2; cos(x[0]*x[1])*x[1], cos(x[0]*x[1])*x[0], 0]
# Mathcad assumes that the number of variables equals maxsub + 1, where maxsub is the largest subscript appearing among the variables in the functions. In this example, maxsub equals 2, so the number of variables is 3.
## Evaluating the Jacobian Numerically
# To evaluate the Jacobian numerically, you must first assign numerical values to the variables. For example,
x := [2; 3; 5]
Jacob([x[0]^2*x[1] + x[1]^2*x[2]; sin(x[0]*x[1])], x) → [12, 34, 9; 3*cos(6), 2*cos(6), 0]
## Specifying Additional Variables That Do Not Appear in the Functions
# If you want to specify that the Jacobian involves more than maxsub + 1 variables, even though the variables with subscripts greater than maxsub do not appear among the functions, you can provide an optional third argument that specifies the number of variables.
# For example, if you set the third argument to 5, Mathcad assumes that the problem involves variables x_0, x_1, x_2, x_3, and x_4, even though x_3 and x_4 do not appear in the functions. Consequently, the Jacobian has two additional columns, containing all zeros, corresponding to x_3 and x_4.
x := x
Jacob(F(x), x, 5) → [2*x[0]*x[1], x[0]^2 + 2*x[1]*x[2], x[1]^2, 0, 0; cos(x[0]*x[1])*x[1], cos(x[0]*x[1])*x[0], 0, 0, 0]
# Similarly, if you define x to be a vector whose length is greater than maxsub, Mathcad assumes that there are extra variables, and adds columns to the result accordingly. For example,
x := [2; 3; 5; -1; -4]
Jacob(F(x), x) → [12, 34, 9, 0, 0; 3*cos(6), 2*cos(6), 0, 0, 0]
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