# Title: New Symbolic Operations
# Description: An outline of the symbolic operations new to this release.
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## NEW FEATURES
# tutorials
# New Symbolic Operations
# Mathcad 14 features new keywords, functions, and modifiers for symbolic operations:
# New Keywords
# New Functions
# New Modifiers
## New Keywords
# Mathcad 14 introduces the following new symbolic keywords:
# combine - Combine terms
# rewrite - Rewrite expressions
# confrac - Find continued fraction expansions
## combine
# You can use the new keyword "combine" to combine the terms in an expression using identities for exponents and elementary functions, such as the exponential and logarithmic functions. For example,
x^m*x^n combine → x^(m + n)
# To use identities for elementary functions, type a comma after "combine," followed by a modifier specifying the elementary function. For example, type "exp" after "combine."
e^x*e^(2*y) combine, exp → e^(x + 2*y)
# To use identities for the logarithmic function, type "ln" after "combine."
ln(x) + ln(2) + 3*ln(3/2) combine, ln → ln((27*x)/4)
# Here are some more examples using other modifiers.
2*sin(x)*cos(x) combine, sincos → sin(2*x)
atan(x) + atan(y) combine, atan → -atan(1/(x*y - 1)*(x + y))
2*log(3, b) - 3*log(2, b) combine, log → -log(8/9, b)
sinh(x)*sinh(y) combine, sinhcosh → cosh(x + y)/2 - 1/2*cosh(x - y)
# Note that the keyword "expand" undoes the results of "combine,"
x^m*x^n combine → x^(m + n)
x^(m + n) expand → x^m*x^n
## rewrite - Rewriting Expressions
# You can use the keyword "rewrite" to rewrite an expression in terms of elementary functions. Type a modifier after "rewrite" to specify which elementary functions you want in the result. For example, to rewrite sin(x) in terms of exponential functions, type "rewrite" followed by the modifier "exp."
sin(x) rewrite, exp → (1/2)*1i*e^((-1i)*x) - e^(1i*x)*(1i*(1/2))
# Here are some more examples using other modifiers:
(1/2)*1i*e^((-1i)*x) - e^(1i*x)*(1i*(1/2)) rewrite, sincos → sin(x)
asinh(x) rewrite, ln → ln(x + sqrt(x^2 + 1))
e^x rewrite, sinhcosh → cosh(x) + sinh(x)
## confrac - Finding Continued Fraction Expansions
# You can use the new keyword "confrac" to find the continued fraction expansion of a number or function. For example,
(2 + sqrt(3))/7 confrac → [0; 1; 1; 7; 24; 8; 24]
# The result is a column vector containing the partial quotients of the continued fraction. To return the continued fraction itself, type a comma after "confrac," followed by the the argument "fraction."
(2 + sqrt(3))/7 confrac, fraction → 1/(1 + 1/(1 + 1/(7 + 1/(24 + 1/(8 + 1/24)))))
# By default, Mathcad returns enough terms of the continued fraction expansion so that the result is accurate to within 10 significant digits. You can specify a different accuracy for the result by typing a comma after "confrac," followed by a positive integer for the number of significant digits. For example, the following expansion is accurate to 4 significant digits.
(2 + sqrt(3))/7 confrac, 4 → [0; 1; 1; 7; 24]
0 + 1/(1 + 1/(1 + 1/(7 + 1/24))) float, 6 → 0.533149
(2 + sqrt(3))/7 float, 6 → 0.53315
# You can also find the continued fraction expansion of a function. For example,
cos(x) confrac → [1, x^2; -2, x^2; -6, x^2]
# The result, which displays a second column for powers of x, represents the continued fraction
cos(x) confrac, fraction → 1 + x^2/(-2 + x^2/(-6))
## New Symbolic Functions
# Mathcad 14 introduces the following new symbolic functions:
# numer, denom - Return the numerator or denominator of an expression
# IsPrime - Determine whether an integer is prime
## Numer, Denom - Returning the Numerator or Denominator of an Expression
# You can use the new functions numer and denom to extract the numerator and denominator of an expression. For example:
numer((a + b + c)/(x^2 + y^2)) → a + b + c
denom((a + b + c)/(x^2 + y^2)) → x^2 + y^2
## IsPrime - Determining Whether an Integer is Prime
# The new function IsPrime returns 1 if an integer is prime and 0 otherwise.
IsPrime(1001) → 0
1001 factor → 7*11*13
IsPrime(10037) → 1
10037 factor → 10037
## New Modifiers
# Mathcad 14 features the following new modifiers that you can use to modify the meanings of keywords:
# Modifiers for variables and solutions: | Modifiers for combine or rewrite:
# ALL | atan
# domain | exp
# fully | ln
# using | log
# raw | sincos
# sinhcosh
# Modifier for coeffs:
# degree
# ALL - Applies a condition to all variables in an expression as in the examples below:
sqrt(x^2) + sqrt(y^2) + sqrt(z^2) assume, ALL > 0 → x + y + z
p := 5
q := 3
r := -1
(p^2 + 3*q)/(5 + r) explicit, ALL → (5^2 + 3*3)/(5 + (-1))
# atan - Use with combine to combine functions using inverse tangent identities.
# degree - Use with "coeffs" to add a second column to the result, which contains the degrees of the terms corresponding to each coefficient. For example,
3*x^3 + 5*x^2 - 4 coeffs, degree → [-4, 0; 0, 1; 5, 2; 3, 3]
# domain - Use with "factor" or "parfrac" to specify the domain over which the factorization or partial fractions decomposition should be performed. The following example factors a polynomial over the real numbers.
x^3 - 2 factor, domain == complex; float, 3 → (x - 1.26)*(x + 0.63 + (-1.09)*1i)*(x + 0.63 + 1.09i)
# You can also perform partial fractions decompositions over the complex numbers.
1/(x^2 + 2) parfrac, x, domain == complex → ((1/4)*1i*sqrt(2))/(x + 1i*sqrt(2)) - 1/4*1i*sqrt(2)/(x - 1i*sqrt(2))
# exp - Use with combine to combine functions using exponential identities, or with rewrite to rewrite expressions in terms of exponential functions.
# fully - Returns a fully detailed solution to an equation. For example,
a*x == 1 solve, x, fully → {
    1/a if a ≠ 0
    undefined if a == 0
}
# Mathcad includes the case in which a = 0. If you omit the modifier "fully," Mathcad returns a simpler answer.
a*x == 1 solve, x → 1/a
# See "More Detailed Results from Symbolic Operations" for more examples.
# ln - Use with combine to combine expressions using identities for the natural logarithm, or with rewrite to rewrite expressions in terms of the natural logarithm.
# log - Use with combine to combine expressions using identities for logarithms base b, or with rewrite to rewrite expressions in terms of logarithms base b.
# using - You can use the new modifier "using" after "solve" to replace generated variables, such as _n, with the variable name of your choice.
cos(x) == 0 solve, fully → {
    π/2 + π*_n if _n ∈ ℤ
    undefined otherwise
}
# In the answer, _n represents an arbitrary integer. You can replace it with another variable name as follows:
cos(x) == 0 solve, fully, using, _n == k, fully →  # error: The "using" keyword cannot rename a variable that does not newly appear in the result expression.
# The modifier "using" differs from "substitute" in that it checks to see whether the variable name you type on the left side of the Boolean equals is actually the generated variable that would be returned by default. If not, Mathcad returns an error.
# See "More Detailed Results from Symbolic Operations" for more examples.
# raw - Returns results that are not simplified for transform keywords.
x^2 + 3*x ztrans, x → (2*z*(2*z - 1))/(z - 1)^3
x^2 + 3*x ztrans, x, raw → (z^2 + z)/(z - 1)^3 + (3*z)/(z - 1)^2
# sincos - Use with combine to combine expressions using identities for sine and cosine functions, or with rewrite to rewrite expressions in terms of sine and cosine functions.
# sinhcosh - Use with combine to combine expressions using identities for hyperbolic functions, or with rewrite to rewrite expressions in terms of hyperbolic functions.
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