# Title: Unicode Character Support in Mathcad 13.5
# Description: Describes the enhanced support for Unicode characters in Mathcad, and how double-byte characters can now be used in variable names, plot titles, and trace labels, along with the effect on Greek characters.
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## NEW FEATURES
# tutorials
# Internationalization and Unicode
## Enhanced Language Support
# Mathcad and its documentation is now available in nine languages:
# English, French, German, Italian, Japanese, Korean, Simplified Chinese, Spanish, and Traditional Chinese. Additionally, Mathcad supports checking your spelling in fifteen languages and dialects.
## Unicode
# Mathcad now provides support for Unicode character sets across the
# application. You can enter non-ASCII characters such as special mathematical symbols and characters from Asian, Greek, Hebrew, Cyrillic and other languages into variables, plot titles, and trace labels. You can also enter these characters into dialogs, such as the Search dialog. All discipline-correct notation can be entered in any area of a worksheet.
# Note: You should no longer use the Symbol font when you enter Greek characters, since the Symbol font is not a Unicode font. Use of the Symbol font may cause problems when saving worksheets, especially on double-byte operating systems. See the note on Unicode and Greek Characters.
# Note: The implementation of this feature may cause problems if you save your worksheets using an earlier Mathcad format. Versions of Mathcad prior to Mathcad 14 do not record information about the code page in saved files. As a result, when Mathcad saves a file using an earlier format, it assumes that the file will be opened on a workstation using the same code page. If the worksheet contains content authored with a different code page, those characters may not map correctly to the assumed code page.
# Here are some examples of what you can now do:
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∆(a, b) := a - b
я := 5
∆(8, я) = 3
# To enter these characters, you need to either use an input device that supports them, or paste them from another application, such as the Character Map accessory in Windows. To enter a Greek character, type the Roman character, then follow it by [Ctrl] G.
# Note: Not all fonts contain the same displayable Unicode characters. To view a Unicode character, you may need to switch one or more of your worksheet fonts. If the selected font does not contain a particular character, Mathcad displays an empty box in place of the character. Mathcad will still properly track instances of the character in your calculations and save all uses of it within the file.
# To find and add special characters:
# 1.  Open Character Map in your Programs > Accessories > System Tools.
# 2.  View different fonts until you locate a character that you want.
# 3.  Select and copy the character you want to use.
# 4.  In Mathcad, choose Paste Special from the Edit menu, then choose "Unformatted Text as Math."
## Unicode and Greek Characters
# Greek characters are no longer represented in worksheets using the Symbol font. Instead, Mathcad uses the Greek characters found in the extended section of Unicode fonts.
# To enter a Greek character in a worksheet, use either the Greek toolbar or type the character's Roman equivalent, followed by [Ctrl] G to change a character to its Greek equivalent.
# You can now enter a Greek character into the Find dialog to search for Greek characters in your worksheets.
# In previous versions of Mathcad, selecting the "γ" in the expression below and changing its font or style had no effect, since the character was not dependent upon the Math styles.
γ := 2*e
# In Mathcad 14, changes to either the font or the style do affect Greek characters. Changing the style from Variables, which uses the Times New Roman font, to User 1, which uses the Verdana font, affects both the Greek character γ and the Roman character e:
γ := 2*e
## Better Support for Double-byte Character Sets
# Consistency of editing on Asian systems has vastly improved. The trueness of the display now works for any operating system so that  worksheets can easily be shared across systems.
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