# Title: Overview and Quick Tour
# Description: An introduction to Mathcad.
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# tutorials
## OVERVIEW AND QUICK TOUR OF MATHCAD
# Welcome to Mathcad 14! This overview and quick tour introduces Mathcad to new users. See the Getting Started Primers to start learning Mathcad right now. See New Features for a demonstration of each new feature.
## What Is Mathcad?
# In the most general sense, Mathcad combines
# •  engineering-oriented mathematics notation and functionality,
# •  a powerful numeric and symbolic computational engine,
# •  flexible, full-featured word processing and visualization tools.
# Mathcad is designed for engineering problem-solving productivity and presentation of solutions. In a larger view, Mathcad allows engineers to work with the most natural, powerful mathematics tools available while enabling managers to easily access, track, and reuse work done in their departments.
#
# Mathcad delivers all the solving capabilities, functionality, and robustness needed for calculation, data manipulation, and engineering design work. Its interface makes commonly used features accessible and natural. By allowing text, math, and graphics to be combined in a single worksheet environment, solutions are easy to visualize, illustrate, verify, and annotate.
# Unlike other technical software, Mathcad performs mathematics the same way you do. Equations look like they do on paper, but they calculate instantly. Enter equations, graph data or functions, and annotate all of them with text, anywhere on the page.
x == (-b + sqrt(b^2 - 4*a*c))/(2*a)
# Take derivatives, find integrals, calculate roots, solve systems of equations or ODEs. Change any data, variable, or equation, and Mathcad instantly recalculates your worksheet. Click on the 3 to change the value of T0 below to see what happens to the following results.
T0 := 3*π
f(x) := sin(x/T0)
f'(x) := d/dx(f(x))
x0 := root(f(x) - f'(x), x, 0, T0)
f(x0) =  # no stored result
f'(x0) =  # no stored result
# You can combine numeric and symbolic calculations in an updateable environment:
g1(x) := integral(sin(x/T0), x) → (-3)*π*cos(x/(3*π))
# You can also update graphs:
n := 0 .. 100
x[n] := 8*n/T0
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# Now scroll up and try changing the period of the original sine wave by changing the value of the highlighted variable T0, above, to 2π or 1π. Notice how the new solution is computed and replotted instantly!
# This is just one example of the power and flexibility of Mathcad. Continue reading to learn more about what makes Mathcad such a unique technical computing tool.
## Quick Tour of Essential Features
# Here are three examples that demonstrate many of the core features of Mathcad. Highlighted regions indicate definitions that can be changed to update the worksheet.
## Data Analysis Example
# The following Data Table contains a set of data that may be best approximated by a logarithmic model function.
# [component: outputs data]
# You can import data into your worksheet for analysis using Data Tables. Data may have a mixed format and come from a variety of sources.
X := data[:, 0]
Y := data[:, 1]
# F1 defines a vector of functions to fit. In this example, the data is modeled by the function y == a*ln(x) + b*sqrt(x) + c, where a, b, and c are unknown.
F1(x) := [ln(x); sqrt(x); 1]  # Mathcad supports a full range of scientific and trigonometric functions.
# Next, call the linfit function using the data in X and Y and the vector of functions, F.
S := linfit(X, Y, F1)  # Curve fitting and smoothing are essential calculations in many engineering fields.
# Finally, define a function that uses these newly found parameter values in the logarithmic model. Also, define a range variable over which to graph the function.
f(x) := F1(x)*S
α := min(X) .. max(X)
# Range variables are handy constructs that allow you to define arithmetic sequences of values over which to evaluate expressions or iterate calculations.
# A graph of the model function with the newly found parameter values and the original data points reveals a good fit.
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# 2D graphs are a snap to create. You can mix plot types and format them to suit your particular representational need.
## Units Analysis
# Mathcad allows you to easily convert between multiple unit systems, and even helps you find mistakes by letting you know if you have made a mistake in the units employed by your calculations. For example, the force calculation below should end up in newtons (or an equivalent force unit):
a := 10*m/s
mass := 2*kg
F := mass*a
F =  # no stored result
# but it appears to have an extraneous factor of seconds. By looking closely at the statements in the calculation, you can see that the definition of the acceleration a is missing a term of s^-1.
# You can even calculate with units from different units systems:
305*ft + 6*km =  # no stored result
# The default unit system in Mathcad is SI, but you can set the unit system to MKS, CGS, US, or none. To change
# the above result from meters to feet, just click in the units placeholder and change it.
305*ft + 6*km =  # no stored result
## Calculus Example
# Enter a function you want to integrate:
f(x, y) := 2 - x^2 - y^2  # Highlighting and other text and math formatting options let you completely customize the look of your document.
# [component: inputs f]
## Surface plot
# 3D graphs offer dynamic, colorful representation of your data.
# [component: inputs f]
## Contour plot
# Suppose you want the surface area above to show only the disc x^2 + y^2 ≤ r^2 where r is constant.
# Live math expressions may be embedded in text regions, enabling seamless integration of computations and explanations.
# Enter radius of disc-shaped region of integration:
r := sqrt(2)
# Surface area:
A := integral(integral(sqrt(1 + (d/dx(f(x, y)))^2 + (d/dy(f(x, y)))^2), y = -sqrt(r^2 - x^2) .. sqrt(r^2 - x^2)), x = -r .. r)
A =  # no stored result  # Mathcad definitions use real math notation, which gives your worksheets a unique self-documenting quality.
# Converting to polar coordinates is faster and more accurate:
# Greek letters are available from the Greek toolbar, one of eleven special math toolbars designed to help you work more efficiently. You can enter them into plot labels and dialogs as well.
integral(integral(sqrt(1 + 4*ρ^2)*ρ, ρ = 0 .. r), θ = 0 .. 2*π)
# yields
1/6*((1 + 4*r^2)^(3/2) - 1)*π  # Symbolic expression for surface area
1/6*((1 + 4*2)^(3/2) - 1)*π  # Special case when r = 2
# Symbolic results are sometimes required to express an exact solution.
# simplifies to
13/3*π
13/3*π =  # no stored result
# Mathcad allows you to find both floating point and exact results of numeric calculations.
## Automation Example
## Typical Thickness Ranges for Different Classes of Thermoplastics
# This example reads in a data table of plastic types and an associated low and high value for typical wall thicknesses. It assigns the row labels (plastic names) to a list, making it easy for you to choose one. It then assigns the low and high thickness values to the minimum and maximum of a slider, so this range can be used in subsequent calculations.
# [component: outputs Plastics]
# The File Input component lets you link data dynamically to a worksheet, then you can specify which columns and rows to extract.
Plastics =  # no stored result
# Mathcad's Automation Interface allows Mathcad to interact with other OLE objects or even with its own objects. This List Box Control has access to the worksheet variable, Plastics.
# [component: inputs Plastics; outputs [Material; index]]
# First click on a material in the text box above, then move the slider to pick different thicknesses and see the results below.
# Nominal wall thickness working range:
# [component: inputs index; outputs thickness]
Material =  # no stored result
thickness =  # no stored result
index =  # no stored result
# Sliders and other controls allow you to simplify the interface even further for the end user.
# Note that this process takes the error out of reading the table correctly and makes the whole range of permissible values available for calculations and design optimization. With more columns of other data, or column labels, you can add more lists containing the other available properties, which can be output as well. You can also exclude columns or rows of data. For example, if you right-click on the data file above and choose Properties, then click on the Data Range tab, you see that certain rows have been successfully excluded from import.
## Interoperability with Other Applications
# You can extend Mathcad's computational power by using components, specialized OLE objects that allow you to interface with other applications and data sources. For example, CAD drawings can sit in a Mathcad worksheet and interact with Mathcad variables. Conversely, a Mathcad calculation can be integrated into other applications or interfaces to solve problems or demonstrate your ideas. For example, the Excel Add-in for Mathcad allows you to insert Mathcad calculations in Excel spreadsheets. You can automate your CAD drawings from Mathcad and automatically verify them against specifications. You can even use Visual Basic and OLE Automation to develop complete solutions that incorporate Mathcad computations.
## Mathcad Resources
# Even experienced Mathcad users constantly discover new ways of using Mathcad, so for the beginner the possibilities can be overwhelming. The Mathcad Tutorials are for Mathcad users of every level of expertise, from beginners to power users. The Resources toolbar is your window onto a wealth of tutorial and reference content that can help you quickly become a fluent user of Mathcad. The following help and reference materials are available to you:
# •  Tutorials
# •  QuickSheets
# •  Reference Tables
# Tutorials are included for users at every level of expertise. For beginners there is a step-by-step, keystroke guide to the basics of building and editing expressions, formatting plots, entering and formatting text, working with units, and using Mathcad's built-in functions and operators, called Getting Started Primers. In-depth Tutorials provide more instruction on useful features.
# QuickSheets are a collection of example worksheets for common plots, computations, and analyses. Here you find models for many of the tasks you bring to Mathcad, and you can either work directly in the QuickSheets by supplying your own inputs or use them as starting points for building your own worksheets. Browse carefully through this collection to get a good idea of the range and power of Mathcad.
# Reference Tables provide physical constants and mathematical formulas. There's a wealth of data here, which you can search efficiently by clicking the binoculars icon on the Resources window toolbar. In fact, all Resources content is referenced by a single search index so you can quickly find what you need.
## Interconnectivity through Mathcad
# Mathcad is a Web tool that helps you use the Internet as a resource to publish your own Mathcad worksheets. This technology allows you to bring your ideas directly to other people who may be interested in your work, even those who do not use Mathcad. Read more about what you can do in the online Author's Reference under the Help menu.
# The default file format in Mathcad is XML-based so that by using included transforms you can view worksheets directly in a browser, and the same worksheets can be converted seamlessly to PDF and other XML-compatible applications for metadata analysis, publishing, and data retrieval.
## Mathcad Resources on the Web
# Within Mathcad you can access the Web as easily as you do your local file system. Thanks to a built-in version of Microsoft's Internet Explorer your Resource window is a full Web browser, but with a difference: any Mathcad files you find will load as live worksheets. With Mathcad, live math comes to the Web. Go to the PTC.com download area for the latest updates to the software and Mathcad E-books. To see applied Mathcad files, including user-contributed worksheets, E-books, Web sites, Mathcad graph and animations, and printed books about Mathcad visit the Mathcad Resources section of the PTC Web site.
## Mathcad User Forums
# Using Mathcad's connections to the Web, you can also share your Mathcad worksheets with others in your field via the Mathcad User Forums. Post your worksheets and questions for advice from experienced power users. You can find discussion groups on engineering topics as well as files contributed by users from all over the world. The User Forums lets you collaborate easily during any phase of a project - and you can do it in the rich and powerful language of mathematics.
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