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# IMAGE FILTERING AND RESTORATION
# Filtering Noise
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# Filtering noise can be approached in a number of ways, depending on what generated the noise, and what sort of edge distortions are acceptable in the output. First, consider the simple salt-and-pepper noise generated by the function addnoise:
orig := READ_IMAGE("camera.bmp")
noisy := addnoise(orig, .2, 128)
# To remove this type of noise, you could either use an averaging function, such as smoothing, or try more sophisticated filtering, such as median filtering.
smooth := unismooth(noisy)
med := medfilt(noisy)
# [component: inputs orig]
# [component: inputs noisy]
# [component: inputs smooth]
# [component: inputs med]
# Median filtering is a better way to filter this type of noise because it does not change the intensity levels in the image, but only uses available levels. To see this, look at the histograms of the four images.
intensity1 := imhist(orig, 256)
intensity2 := imhist(noisy, 256)
intensity3 := imhist(smooth, 256)
intensity4 := imhist(med, 256)
k := 0 .. length(intensity1) - 1
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# The intensity graph of the median filtered image most closely matches that of the original. Also, if the local differences between intensities are not too great, median filtering does not shift the edges of the image significantly.
edge1 := prewitt(orig)
edge2 := prewitt(smooth)
edge3 := prewitt(med)
# [component: inputs edge1]
# [component: inputs edge2]
# [component: inputs edge3]
# The median filter does a much better job of preserving the edges in this case.
# There are, however, other types of noise which are less responsive to median filtering. For example, Gaussian noise, which was demonstrated in the section Addition and Measurement of Noise, is better handled by other types of filtering. We can use the following function for Gaussian noise:
gnoise(A, σ) := A + σ*sqrt(-2*ln(rnd(1)))*cos(2*π*rnd(1))
# where A is the mean value of the noise, and σ is the standard deviation.
i := 0 .. rows(orig) - 1
j := 0 .. cols(orig) - 1
noise[i, j] := gnoise(0, 20)
gnoisy := clip(orig + noise, 0, 255)
gsmooth := unismooth(gnoisy)
gmed := medfilt(gnoisy)
glow := gaussconv(gnoisy, 5)
# [component: inputs gnoisy]
# [component: inputs gsmooth]
# [component: inputs gmed]
# [component: inputs glow]
# None of these filtering methods gives really spectacular results. For a more appropriate method, see the example on Wavelet Smoothing.
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